    <aerodynamics>
    <fileheader>
        <author>Richard Harrison</author>
        <filecreationdate>2018-03-08</filecreationdate>
        <version>1.0</version>
        <copyright>Copyright (C) 2016 Richard Harrison, All rights reserved</copyright>
        <description></description>
        <note>
        A320-200
    </note>
        <note>Built with AeroTool 1.0.0.0: Options: AeroDetail=Medium, WakeIterations=4</note>
        <limitation></limitation>
        <reference
            refID="ZDAT/AED/2017/12-15"
            author="Richard Harrison, rjh@zaretto.com"
            title="A320 200 Aerodynamic data built from vspaero; CG (15.3, 0, 0)M"
            date="December 15, 2017"
            URL="http://www.zaretto.com/sites/zaretto.com/files/A320-200-data/rjh-zaretto-A320-200-aerodynamic-data-vspaero.pdf"
        />
    </fileheader>
    <function name="aero/c/CFXB">
    <description>BASE DRAG</description>
    <product>
          <table>
            <independentVar lookup="row">aero/alpha-deg</independentVar>
            <independentVar lookup="column">aero/beta-deg</independentVar>
            <tableData>
                                -10	         -5	          0	          5	         10
                    -10	    0.06236	    0.05944	    0.05898	    0.05944	    0.06236
                     -5	    0.03845	    0.03466	    0.03312	    0.03466	    0.03845
                     -2	    0.03262	    0.02831	    0.02684	    0.02831	    0.03262
                      0	    0.03235	    0.02761	    0.02606	    0.02761	    0.03235
                      2	    0.03405	    0.02964	    0.02784	    0.02964	    0.03405
                      5	    0.04264	    0.03804	    0.03566	    0.03804	    0.04244
                      7	    0.05753	    0.04726	    0.04467	    0.04726	    0.05739
                     10	    0.07284	    0.06723	    0.06409	    0.06723	    0.07284
                     11	    0.08009	    0.07351	    0.07241	    0.07351	    0.08009
                     12	    0.08770	    0.08342	    0.08092	    0.08343	    0.08770
                     13	    0.09562	    0.09122	    0.08941	    0.09122	    0.09562
                     14	    0.10439	    0.09885	    0.09780	    0.09885	    0.10439
                     15	    0.11345	    0.10674	    0.10579	    0.10674	    0.11345
                     20	    0.14679	    0.14336	    0.14196	    0.14330	    0.14757
                     30	    0.20057	    0.19674	    0.19730	    0.19674	    0.20056
                     45	    0.24472	    0.24435	    0.24511	    0.24435	    0.24567
                     55	    0.26496	    0.26507	    0.26614	    0.26507	    0.26651
                     60	    0.27356	    0.27359	    0.27458	    0.27359	    0.27356
            </tableData>
          </table>
       </product>
    </function>
    <function name="aero/c/CFXDAD">
    <description>DRAG INCREMENT DUE TO AILERON DEFLECTION</description>
    <product>
          <property>fcs/roll-pos-deg</property>
          <table>
            <independentVar lookup="row">aero/alpha-deg</independentVar>
            <independentVar lookup="column">aero/beta-deg</independentVar>
            <tableData>
                                -10	         -5	          0	          5	         10
                    -10	  -0.00010	  -0.00009	  -0.00008	  -0.00007	  -0.00007
                     -5	  -0.00015	  -0.00014	  -0.00013	  -0.00013	  -0.00012
                     -2	  -0.00016	  -0.00015	  -0.00014	  -0.00013	  -0.00012
                      0	  -0.00016	  -0.00015	  -0.00014	  -0.00013	  -0.00011
                      2	  -0.00017	  -0.00016	  -0.00014	  -0.00012	  -0.00011
                      5	  -0.00014	  -0.00014	  -0.00012	  -0.00012	  -0.00011
                      7	  -0.00013	  -0.00011	  -0.00010	  -0.00010	  -0.00008
                     10	  -0.00008	  -0.00007	  -0.00007	  -0.00006	  -0.00005
                     11	  -0.00007	  -0.00006	  -0.00004	  -0.00005	  -0.00005
                     12	  -0.00005	  -0.00004	  -0.00004	  -0.00004	  -0.00004
                     13	  -0.00004	  -0.00004	  -0.00003	  -0.00003	  -0.00003
                     14	  -0.00003	  -0.00003	  -0.00002	  -0.00002	    0.00001
                     15	  -0.00003	  -0.00002	  -0.00002	  -0.00001	  -0.00001
                     20	  -0.00002	  -0.00001	  -0.00001	   0.00000	    0.00002
                     30	   0.00000	    0.00000	    0.00000	   0.00000	    0.00001
                     45	    0.00001	    0.00002	    0.00001	    0.00001	    0.00005
                     55	    0.00001	    0.00001	    0.00001	    0.00001	    0.00008
                     60	    0.00001	    0.00002	    0.00002	    0.00002	    0.00002
            </tableData>
          </table>
       </product>
    </function>
    <function name="aero/c/CFXDFM">
    <description>DRAG INCREMENT DUE TO FLAPS</description>
    <product>
          <property>fcs/flap-pos-deg</property>
          <table>
            <independentVar lookup="row">aero/alpha-deg</independentVar>
            <independentVar lookup="column">aero/beta-deg</independentVar>
            <tableData>
                                -10	         -5	          0	          5	         10
                    -10	  -0.01797	  -0.01891	  -0.01907	  -0.01891	  -0.01797
                     -5	  -0.00013	  -0.00030	  -0.00016	  -0.00030	  -0.00013
                     -2	    0.01254	    0.01354	    0.01273	    0.01354	    0.01254
                      0	    0.02147	    0.02287	    0.02224	    0.02287	    0.02147
                      2	    0.03215	    0.03372	    0.03233	    0.03372	    0.03215
                      5	    0.05117	    0.04990	    0.04806	    0.04990	    0.05137
                      7	    0.05346	    0.06031	    0.05946	    0.06031	    0.05360
                     10	    0.06332	    0.06473	    0.06369	    0.06473	    0.06332
                     11	    0.06342	    0.06881	    0.06619	    0.06881	    0.06342
                     12	    0.06843	    0.06901	    0.06736	    0.06900	    0.06843
                     13	    0.06855	    0.06863	    0.06793	    0.06863	    0.06855
                     14	    0.06798	    0.06654	    0.06688	    0.06654	    0.06798
                     15	    0.06632	    0.06584	    0.06653	    0.06584	    0.06632
                     20	    0.06555	    0.06454	    0.06605	    0.06460	    0.06477
                     30	    0.08286	    0.08220	    0.08175	    0.08220	    0.08287
                     45	    0.09243	    0.08918	    0.08860	    0.08918	    0.09148
                     55	    0.13774	    0.13566	    0.12421	    0.13566	    0.13619
                     60	    0.14518	    0.14756	    0.14780	    0.14756	    0.14518
            </tableData>
          </table>
       </product>
    </function>
    <function name="aero/c/CFXDRD">
    <description>DRAG INCREMENT DUE TO RUDDER DEFLECTION</description>
    <product>
          <property>fcs/rudder-pos-deg</property>
          <table>
            <independentVar lookup="row">aero/alpha-deg</independentVar>
            <independentVar lookup="column">aero/beta-deg</independentVar>
            <tableData>
                                -10	         -5	          0	          5	         10
                    -10	  -0.00082	  -0.00059	  -0.00020	  -0.00019	    0.00010
                     -5	  -0.00087	  -0.00071	  -0.00052	  -0.00013	    0.00014
                     -2	  -0.00079	  -0.00057	  -0.00035	  -0.00010	    0.00016
                      0	  -0.00072	  -0.00051	  -0.00035	  -0.00008	    0.00019
                      2	  -0.00071	  -0.00047	  -0.00022	  -0.00004	    0.00020
                      5	  -0.00074	  -0.00044	  -0.00022	    0.00001	    0.00024
                      7	  -0.00085	  -0.00038	  -0.00019	    0.00004	    0.00044
                     10	  -0.00076	  -0.00050	    0.00001	    0.00011	    0.00036
                     11	  -0.00075	  -0.00042	  -0.00043	    0.00001	    0.00034
                     12	  -0.00077	  -0.00049	  -0.00038	    0.00009	    0.00036
                     13	  -0.00074	  -0.00052	  -0.00025	    0.00008	    0.00034
                     14	  -0.00073	  -0.00049	  -0.00021	    0.00006	    0.00037
                     15	  -0.00074	  -0.00039	  -0.00011	    0.00006	    0.00042
                     20	  -0.00056	  -0.00046	  -0.00011	    0.00011	    0.00035
                     30	  -0.00044	  -0.00018	   0.00000	    0.00003	    0.00035
                     45	  -0.00007	  -0.00001	    0.00001	   0.00000	    0.00011
                     55	  -0.00001	   0.00000	   0.00000	   0.00000	    0.00008
                     60	    0.00000	    0.00000	    0.00000	   0.00000	    0.00001
            </tableData>
          </table>
       </product>
    </function>
    <function name="aero/c/CFXDSM">
    <description>DRAG INCREMENT DUE TO SLATS</description>
    <product>
          <property>fcs/slat-pos-deg</property>
          <table>
            <independentVar lookup="row">aero/alpha-deg</independentVar>
            <independentVar lookup="column">aero/beta-deg</independentVar>
            <tableData>
                                -10	         -5	          0	          5	         10
                    -10	  -0.01340	  -0.01374	  -0.01382	  -0.01374	  -0.01340
                     -5	  -0.00330	  -0.00305	  -0.00289	  -0.00305	  -0.00330
                     -2	    0.00434	    0.00514	    0.00489	    0.00514	    0.00434
                      0	    0.01038	    0.01105	    0.01103	    0.01105	    0.01038
                      2	    0.01782	    0.01810	    0.01793	    0.01810	    0.01782
                      5	    0.02684	    0.02935	    0.02919	    0.02935	    0.02704
                      7	    0.03291	    0.03772	    0.03721	    0.03772	    0.03305
                     10	    0.04287	    0.04789	    0.04827	    0.04789	    0.04287
                     11	    0.04685	    0.04883	    0.04923	    0.04883	    0.04685
                     12	    0.04951	    0.05009	    0.05026	    0.05008	    0.04951
                     13	    0.05071	    0.05073	    0.05099	    0.05073	    0.05071
                     14	    0.05148	    0.05105	    0.05152	    0.05105	    0.05148
                     15	    0.05167	    0.05152	    0.05117	    0.05152	    0.05167
                     20	    0.05185	    0.05173	    0.05223	    0.05179	    0.05107
                     30	    0.06891	    0.06967	    0.06925	    0.06967	    0.06892
                     45	    0.07887	    0.08049	    0.08118	    0.08049	    0.07792
                     55	    0.08302	    0.08383	    0.08394	    0.08383	    0.08147
                     60	    0.08436	    0.08492	    0.08515	    0.08492	    0.08436
            </tableData>
          </table>
       </product>
    </function>
    <function name="aero/c/CFXDSPL">
    <description>DRAG INCREMENT DUE TO SPOILERS LEFT</description>
    <product>
          <table>
            <independentVar lookup="row">aero/alpha-deg</independentVar>
            <independentVar lookup="column">aero/beta-deg</independentVar>
            <independentVar lookup="table">fcs/speedbrake-left-deg</independentVar>
              <tableData breakPoint="0">
                              -10	        -5	         0	         5	        10
                    -10	    0.00000	    0.00000	    0.00000	    0.00000	    0.00000
                     -5	    0.00000	    0.00000	    0.00000	    0.00000	    0.00000
                     -2	    0.00000	    0.00000	    0.00000	    0.00000	    0.00000
                      0	    0.00000	    0.00000	    0.00000	    0.00000	    0.00000
                      2	    0.00000	    0.00000	    0.00000	    0.00000	    0.00000
                      5	    0.00000	    0.00000	    0.00000	    0.00000	    0.00000
                      7	    0.00000	    0.00000	    0.00000	    0.00000	    0.00000
                     10	    0.00000	    0.00000	    0.00000	    0.00000	    0.00000
                     11	    0.00000	    0.00000	    0.00000	    0.00000	    0.00000
                     12	    0.00000	    0.00000	    0.00000	    0.00000	    0.00000
                     13	    0.00000	    0.00000	    0.00000	    0.00000	    0.00000
                     14	    0.00000	    0.00000	    0.00000	    0.00000	    0.00000
                     15	    0.00000	    0.00000	    0.00000	    0.00000	    0.00000
                     20	    0.00000	    0.00000	    0.00000	    0.00000	    0.00000
                     30	    0.00000	    0.00000	    0.00000	    0.00000	    0.00000
                     45	    0.00000	    0.00000	    0.00000	    0.00000	    0.00000
                     55	    0.00000	    0.00000	    0.00000	    0.00000	    0.00000
                     60	    0.00000	    0.00000	    0.00000	    0.00000	    0.00000
              </tableData>
              <tableData breakPoint="20">
                              -10	        -5	         0	         5	        10
                    -10	    0.01041	    0.01072	    0.01122	    0.01173	    0.01218
                     -5	    0.00899	    0.00979	    0.01126	    0.01223	    0.01255
                     -2	    0.00654	    0.00690	    0.00777	    0.00847	    0.00832
                      0	    0.00505	    0.00534	    0.00582	    0.00620	    0.00568
                      2	    0.00364	    0.00387	    0.00384	    0.00367	    0.00354
                      5	    0.00150	    0.00128	    0.00078	    0.00015	  -0.00052
                      7	  -0.00089	  -0.00082	  -0.00169	  -0.00172	  -0.00495
                     10	  -0.00347	  -0.00403	  -0.00504	  -0.00590	  -0.00730
                     11	  -0.00398	  -0.00473	  -0.00642	  -0.00709	  -0.00805
                     12	  -0.00476	  -0.00649	  -0.00707	  -0.00755	  -0.00817
                     13	  -0.00597	  -0.00700	  -0.00757	  -0.00765	  -0.00834
                     14	  -0.00671	  -0.00724	  -0.00771	  -0.00757	  -0.00802
                     15	  -0.00713	  -0.00712	  -0.00714	  -0.00747	  -0.00757
                     20	  -0.00515	  -0.00544	  -0.00554	  -0.00558	  -0.00625
                     30	  -0.00421	  -0.00480	  -0.00510	  -0.00522	  -0.00714
                     45	  -0.00464	  -0.00516	  -0.00522	  -0.00544	  -0.00679
                     55	  -0.00404	  -0.00446	  -0.00448	  -0.00473	  -0.00659
                     60	  -0.00366	  -0.00402	  -0.00415	  -0.00423	  -0.00458
              </tableData>
              <tableData breakPoint="50">
                              -10	        -5	         0	         5	        10
                    -10	    0.01583	    0.01644	    0.01737	    0.01825	    0.01916
                     -5	    0.01859	    0.01919	    0.02120	    0.02220	    0.02352
                     -2	    0.01654	    0.01790	    0.01981	    0.02166	    0.02182
                      0	    0.01397	    0.01537	    0.01739	    0.01891	    0.01850
                      2	    0.01172	    0.01286	    0.01385	    0.01454	    0.01415
                      5	    0.00823	    0.00887	    0.00883	    0.00835	    0.00653
                      7	    0.00450	    0.00572	    0.00494	    0.00616	  -0.00077
                     10	    0.00065	    0.00058	  -0.00062	  -0.00130	  -0.00348
                     11	  -0.00039	  -0.00061	  -0.00195	  -0.00202	  -0.00438
                     12	  -0.00149	  -0.00322	  -0.00317	  -0.00341	  -0.00481
                     13	  -0.00349	  -0.00441	  -0.00438	  -0.00406	  -0.00560
                     14	  -0.00498	  -0.00526	  -0.00562	  -0.00476	  -0.00599
                     15	  -0.00620	  -0.00588	  -0.00528	  -0.00532	  -0.00592
                     20	  -0.00664	  -0.00683	  -0.00686	  -0.00700	  -0.00747
                     30	  -0.00638	  -0.00735	  -0.00798	  -0.00808	  -0.01124
                     45	  -0.00804	  -0.00881	  -0.00898	  -0.00940	  -0.01089
                     55	  -0.00741	  -0.00811	  -0.00821	  -0.00857	  -0.01064
                     60	  -0.00695	  -0.00756	  -0.00771	  -0.00792	  -0.00846
              </tableData>
          </table>
       </product>
    </function>
    <function name="aero/c/CFXDSPR">
    <description>DRAG INCREMENT DUE TO SPOILERS RIGHT</description>
    <product>
          <table>
            <independentVar lookup="row">aero/alpha-deg</independentVar>
            <independentVar lookup="column">aero/beta-deg</independentVar>
            <independentVar lookup="table">fcs/speedbrake-right-deg</independentVar>
              <tableData breakPoint="0">
                              -10	        -5	         0	         5	        10
                    -10	    0.00000	    0.00000	    0.00000	    0.00000	    0.00000
                     -5	    0.00000	    0.00000	    0.00000	    0.00000	    0.00000
                     -2	    0.00000	    0.00000	    0.00000	    0.00000	    0.00000
                      0	    0.00000	    0.00000	    0.00000	    0.00000	    0.00000
                      2	    0.00000	    0.00000	    0.00000	    0.00000	    0.00000
                      5	    0.00000	    0.00000	    0.00000	    0.00000	    0.00000
                      7	    0.00000	    0.00000	    0.00000	    0.00000	    0.00000
                     10	    0.00000	    0.00000	    0.00000	    0.00000	    0.00000
                     11	    0.00000	    0.00000	    0.00000	    0.00000	    0.00000
                     12	    0.00000	    0.00000	    0.00000	    0.00000	    0.00000
                     13	    0.00000	    0.00000	    0.00000	    0.00000	    0.00000
                     14	    0.00000	    0.00000	    0.00000	    0.00000	    0.00000
                     15	    0.00000	    0.00000	    0.00000	    0.00000	    0.00000
                     20	    0.00000	    0.00000	    0.00000	    0.00000	    0.00000
                     30	    0.00000	    0.00000	    0.00000	    0.00000	    0.00000
                     45	    0.00000	    0.00000	    0.00000	    0.00000	    0.00000
                     55	    0.00000	    0.00000	    0.00000	    0.00000	    0.00000
                     60	    0.00000	    0.00000	    0.00000	    0.00000	    0.00000
              </tableData>
              <tableData breakPoint="20">
                              -10	        -5	         0	         5	        10
                    -10	    0.01218	    0.01173	    0.01122	    0.01072	    0.01041
                     -5	    0.01255	    0.01223	    0.01126	    0.00979	    0.00899
                     -2	    0.00832	    0.00847	    0.00777	    0.00690	    0.00654
                      0	    0.00568	    0.00620	    0.00582	    0.00534	    0.00505
                      2	    0.00354	    0.00367	    0.00384	    0.00387	    0.00364
                      5	  -0.00072	    0.00015	    0.00078	    0.00128	    0.00170
                      7	  -0.00509	  -0.00172	  -0.00169	  -0.00082	  -0.00075
                     10	  -0.00730	  -0.00590	  -0.00504	  -0.00403	  -0.00347
                     11	  -0.00805	  -0.00709	  -0.00642	  -0.00473	  -0.00398
                     12	  -0.00817	  -0.00754	  -0.00707	  -0.00650	  -0.00476
                     13	  -0.00834	  -0.00765	  -0.00757	  -0.00700	  -0.00597
                     14	  -0.00802	  -0.00757	  -0.00771	  -0.00724	  -0.00671
                     15	  -0.00757	  -0.00747	  -0.00714	  -0.00712	  -0.00713
                     20	  -0.00547	  -0.00564	  -0.00554	  -0.00538	  -0.00593
                     30	  -0.00715	  -0.00522	  -0.00510	  -0.00480	  -0.00420
                     45	  -0.00584	  -0.00544	  -0.00522	  -0.00516	  -0.00559
                     55	  -0.00504	  -0.00473	  -0.00448	  -0.00446	  -0.00559
                     60	  -0.00458	  -0.00423	  -0.00415	  -0.00402	  -0.00366
              </tableData>
              <tableData breakPoint="50">
                              -10	        -5	         0	         5	        10
                    -10	    0.01916	    0.01825	    0.01737	    0.01644	    0.01583
                     -5	    0.02352	    0.02220	    0.02120	    0.01919	    0.01859
                     -2	    0.02182	    0.02166	    0.01981	    0.01790	    0.01654
                      0	    0.01850	    0.01891	    0.01739	    0.01537	    0.01397
                      2	    0.01415	    0.01454	    0.01385	    0.01286	    0.01172
                      5	    0.00633	    0.00835	    0.00883	    0.00887	    0.00843
                      7	  -0.00091	    0.00616	    0.00494	    0.00572	    0.00464
                     10	  -0.00348	  -0.00130	  -0.00062	    0.00058	    0.00065
                     11	  -0.00438	  -0.00202	  -0.00195	  -0.00061	  -0.00039
                     12	  -0.00481	  -0.00340	  -0.00317	  -0.00323	  -0.00149
                     13	  -0.00560	  -0.00406	  -0.00438	  -0.00441	  -0.00349
                     14	  -0.00599	  -0.00476	  -0.00562	  -0.00526	  -0.00498
                     15	  -0.00592	  -0.00532	  -0.00528	  -0.00588	  -0.00620
                     20	  -0.00669	  -0.00706	  -0.00686	  -0.00677	  -0.00742
                     30	  -0.01125	  -0.00808	  -0.00798	  -0.00735	  -0.00637
                     45	  -0.00994	  -0.00940	  -0.00898	  -0.00881	  -0.00899
                     55	  -0.00909	  -0.00857	  -0.00821	  -0.00811	  -0.00896
                     60	  -0.00846	  -0.00792	  -0.00771	  -0.00756	  -0.00695
              </tableData>
          </table>
       </product>
    </function>
    <function name="aero/c/CFZB">
    <description>BASE LIFT</description>
    <product>
          <table>
            <independentVar lookup="row">aero/alpha-deg</independentVar>
            <independentVar lookup="column">fcs/pitch-pos-deg</independentVar>
            <tableData>
                                -17	        -10	         -4	          0	          3	         10	         17	         23	         30
                    -10	  -1.05130	  -1.11278	  -1.16921	  -1.20821	  -1.23638	  -1.30413	  -1.36638	  -1.40660	  -1.42761
                     -5	  -0.37428	  -0.43202	  -0.48481	  -0.52110	  -0.54869	  -0.61272	  -0.67294	  -0.71881	  -0.74430
                     -2	  -0.02374	  -0.07936	  -0.13059	  -0.16546	  -0.19188	  -0.25372	  -0.31266	  -0.35773	  -0.40139
                      0	    0.18994	    0.13296	    0.08161	    0.04744	    0.02185	  -0.03761	  -0.09406	  -0.13724	  -0.17901
                      2	    0.40120	    0.34351	    0.29148	    0.25673	    0.23095	    0.17184	    0.11616	    0.07341	    0.03195
                      5	    0.74967	    0.69205	    0.63964	    0.60443	    0.57829	    0.51849	    0.46283	    0.42042	    0.37923
                      7	    1.01094	    0.95154	    0.89577	    0.86030	    0.83277	    0.77091	    0.71260	    0.66770	    0.62476
                     10	    1.43555	    1.37458	    1.31800	    1.27891	    1.25023	    1.18451	    1.12301	    1.07621	    1.03094
                     11	    1.58403	    1.52237	    1.46470	    1.42651	    1.39752	    1.33125	    1.26967	    1.22144	    1.17554
                     12	    1.68350	    1.62412	    1.56907	    1.53153	    1.50347	    1.43800	    1.37622	    1.32919	    1.28356
                     13	    1.75158	    1.69248	    1.63701	    1.60063	    1.57273	    1.50893	    1.44848	    1.40202	    1.35684
                     14	    1.70808	    1.75070	    1.69602	    1.65864	    1.63064	    1.56636	    1.50579	    1.45982	    1.41473
                     15	    1.84824	    1.79677	    1.74237	    1.70540	    1.67726	    1.61320	    1.55223	    1.50544	    1.45997
                     20	    1.93714	    1.92467	    1.89199	    1.85430	    1.82667	    1.76058	    1.69854	    1.65033	    1.60319
                     30	    1.93282	    1.93093	    1.93009	    1.92940	    1.92879	    1.92034	    1.88750	    1.83611	    1.78502
                     45	    1.88819	    1.88744	    1.88658	    1.88666	    1.88530	    1.88371	    1.88177	    1.87990	    1.87761
                     55	    1.85158	    1.85101	    1.85031	    1.85514	    1.84923	    1.84764	    1.84627	    1.84477	    1.84303
                     60	    1.83195	    1.83150	    1.83091	    1.83041	    1.82998	    1.82877	    1.82736	    1.82604	    1.82451
            </tableData>
          </table>
       </product>
    </function>
    <function name="aero/c/CFZDAD">
    <description>LIFT INCREMENT DUE TO AILERON DEFLECTION</description>
    <product>
          <property>fcs/roll-pos-deg</property>
          <table>
            <independentVar lookup="row">aero/alpha-deg</independentVar>
            <independentVar lookup="column">aero/beta-deg</independentVar>
            <tableData>
                                -10	         -5	          0	          5	         10
                    -10	  -0.00211	  -0.00200	  -0.00188	  -0.00162	  -0.00127
                     -5	  -0.00069	  -0.00052	  -0.00031	    0.00003	    0.00033
                     -2	  -0.00052	  -0.00024	    0.00016	    0.00044	    0.00073
                      0	  -0.00066	  -0.00030	  -0.00004	    0.00036	    0.00066
                      2	  -0.00067	  -0.00048	  -0.00015	    0.00025	    0.00062
                      5	    0.00003	    0.00024	    0.00044	    0.00060	    0.00071
                      7	    0.00058	    0.00080	    0.00101	    0.00117	    0.00126
                     10	    0.00231	    0.00229	    0.00201	    0.00204	    0.00200
                     11	    0.00250	    0.00280	    0.00283	    0.00187	    0.00125
                     12	    0.00260	    0.00286	    0.00232	    0.00174	    0.00093
                     13	    0.00264	    0.00200	    0.00167	    0.00153	    0.00114
                     14	    0.00199	    0.00147	    0.00132	    0.00122	    0.00128
                     15	    0.00141	    0.00117	    0.00103	    0.00091	    0.00085
                     20	   0.00000	    0.00002	    0.00000	    0.00003	    0.00016
                     30	    0.00004	    0.00004	    0.00002	   0.00000	  -0.00001
                     45	    0.00003	    0.00003	    0.00002	    0.00001	    0.00002
                     55	    0.00002	    0.00002	    0.00002	    0.00001	    0.00004
                     60	    0.00002	    0.00002	    0.00002	    0.00002	    0.00002
            </tableData>
          </table>
       </product>
    </function>
    <function name="aero/c/CFZDFM">
    <description>LIFT INCREMENT DUE TO FLAPS</description>
    <product>
          <property>fcs/flap-pos-deg</property>
          <table>
            <independentVar lookup="row">aero/alpha-deg</independentVar>
            <independentVar lookup="column">aero/beta-deg</independentVar>
            <tableData>
                                -10	         -5	          0	          5	         10
                    -10	    0.65892	    0.67573	    0.67872	    0.67573	    0.65892
                     -5	    0.75293	    0.77257	    0.77960	    0.77257	    0.75293
                     -2	    0.82051	    0.84107	    0.84955	    0.84107	    0.82051
                      0	    0.86722	    0.88525	    0.89948	    0.88525	    0.86722
                      2	    0.91009	    0.93520	    0.94162	    0.93520	    0.91009
                      5	    0.94455	    0.99975	    0.99070	    0.99975	    0.94541
                      7	    0.90177	    0.98356	    0.98764	    0.98356	    0.90180
                     10	    0.72706	    0.72942	    0.73550	    0.72942	    0.72706
                     11	    0.66287	    0.65242	    0.63178	    0.65242	    0.66287
                     12	    0.61858	    0.56468	    0.55504	    0.56468	    0.61858
                     13	    0.54472	    0.51492	    0.51224	    0.51490	    0.54468
                     14	    0.49164	    0.47462	    0.46749	    0.47462	    0.49164
                     15	    0.44650	    0.43646	    0.43453	    0.43646	    0.44650
                     20	    0.35309	    0.35593	    0.35546	    0.35623	    0.35009
                     30	    0.41232	    0.41182	    0.40783	    0.41182	    0.41231
                     45	    0.41079	    0.40838	    0.40795	    0.40838	    0.41054
                     55	    0.43201	    0.43390	    0.42660	    0.43390	    0.43139
                     60	    0.42877	    0.43221	    0.43316	    0.43221	    0.42877
            </tableData>
          </table>
       </product>
    </function>
    <function name="aero/c/CFZDRD">
    <description>LIFT INCREMENT DUE TO RUDDER DEFLECTION</description>
    <product>
          <property>fcs/rudder-pos-deg</property>
          <table>
            <independentVar lookup="row">aero/alpha-deg</independentVar>
            <independentVar lookup="column">aero/beta-deg</independentVar>
            <tableData>
                                -10	         -5	          0	          5	         10
                    -10	    0.00003	    0.00014	  -0.00077	    0.00021	    0.00017
                     -5	    0.00021	    0.00067	    0.00112	    0.00027	    0.00010
                     -2	    0.00012	    0.00024	    0.00077	    0.00015	    0.00007
                      0	    0.00016	    0.00018	    0.00017	    0.00009	    0.00011
                      2	    0.00009	    0.00000	  -0.00016	  -0.00004	  -0.00008
                      5	    0.00002	  -0.00014	  -0.00016	  -0.00003	    0.00001
                      7	  -0.00003	    0.00018	    0.00016	  -0.00023	    0.00013
                     10	  -0.00020	    0.00037	  -0.00010	  -0.00030	    0.00026
                     11	  -0.00026	    0.00035	    0.00000	  -0.00017	    0.00021
                     12	  -0.00012	    0.00028	  -0.00007	  -0.00008	    0.00011
                     13	  -0.00019	  -0.00002	  -0.00003	  -0.00007	    0.00016
                     14	  -0.00018	   0.00000	    0.00003	  -0.00001	    0.00027
                     15	  -0.00006	    0.00090	    0.00003	    0.00015	    0.00024
                     20	    0.00020	  -0.00014	  -0.00009	    0.00029	    0.00042
                     30	    0.00032	    0.00037	    0.00045	  -0.00015	  -0.00021
                     45	    0.00003	    0.00009	    0.00004	  -0.00004	    0.00002
                     55	  -0.00002	  -0.00001	    0.00000	    0.00001	    0.00007
                     60	    0.00000	   0.00000	    0.00000	    0.00001	    0.00002
            </tableData>
          </table>
       </product>
    </function>
    <function name="aero/c/CFZDSM">
    <description>LIFT INCREMENT DUE TO SLATS</description>
    <product>
          <property>fcs/slat-pos-deg</property>
          <table>
            <independentVar lookup="row">aero/alpha-deg</independentVar>
            <independentVar lookup="column">aero/beta-deg</independentVar>
            <tableData>
                                -10	         -5	          0	          5	         10
                    -10	    0.43716	    0.45042	    0.45441	    0.45042	    0.43716
                     -5	    0.47003	    0.48285	    0.48828	    0.48285	    0.47003
                     -2	    0.52645	    0.54065	    0.54371	    0.54065	    0.52645
                      0	    0.57744	    0.58886	    0.59608	    0.58886	    0.57744
                      2	    0.62648	    0.64127	    0.64530	    0.64127	    0.62648
                      5	    0.66067	    0.68529	    0.68513	    0.68529	    0.66153
                      7	    0.66838	    0.69794	    0.70018	    0.69794	    0.66841
                     10	    0.58076	    0.63659	    0.65407	    0.63659	    0.58076
                     11	    0.57401	    0.57704	    0.56268	    0.57704	    0.57401
                     12	    0.54661	    0.51986	    0.50773	    0.51986	    0.54661
                     13	    0.50270	    0.48601	    0.48099	    0.48599	    0.50266
                     14	    0.46709	    0.46216	    0.45889	    0.46216	    0.46709
                     15	    0.44576	    0.43732	    0.43362	    0.43732	    0.44576
                     20	    0.35889	    0.35660	    0.35647	    0.35690	    0.35589
                     30	    0.40220	    0.40215	    0.40068	    0.40215	    0.40219
                     45	    0.39405	    0.39669	    0.39768	    0.39669	    0.39380
                     55	    0.38743	    0.38868	    0.38898	    0.38868	    0.38681
                     60	    0.38369	    0.38492	    0.38539	    0.38492	    0.38369
            </tableData>
          </table>
       </product>
    </function>
    <function name="aero/c/CFZDSPL">
    <description>LIFT INCREMENT DUE TO SPOILERS LEFT</description>
    <product>
          <table>
            <independentVar lookup="row">aero/alpha-deg</independentVar>
            <independentVar lookup="column">aero/beta-deg</independentVar>
            <independentVar lookup="table">fcs/speedbrake-left-deg</independentVar>
              <tableData breakPoint="0">
                              -10	        -5	         0	         5	        10
                    -10	    0.00000	    0.00000	    0.00000	    0.00000	    0.00000
                     -5	    0.00000	    0.00000	    0.00000	    0.00000	    0.00000
                     -2	    0.00000	    0.00000	    0.00000	    0.00000	    0.00000
                      0	    0.00000	    0.00000	    0.00000	    0.00000	    0.00000
                      2	    0.00000	    0.00000	    0.00000	    0.00000	    0.00000
                      5	    0.00000	    0.00000	    0.00000	    0.00000	    0.00000
                      7	    0.00000	    0.00000	    0.00000	    0.00000	    0.00000
                     10	    0.00000	    0.00000	    0.00000	    0.00000	    0.00000
                     11	    0.00000	    0.00000	    0.00000	    0.00000	    0.00000
                     12	    0.00000	    0.00000	    0.00000	    0.00000	    0.00000
                     13	    0.00000	    0.00000	    0.00000	    0.00000	    0.00000
                     14	    0.00000	    0.00000	    0.00000	    0.00000	    0.00000
                     15	    0.00000	    0.00000	    0.00000	    0.00000	    0.00000
                     20	    0.00000	    0.00000	    0.00000	    0.00000	    0.00000
                     30	    0.00000	    0.00000	    0.00000	    0.00000	    0.00000
                     45	    0.00000	    0.00000	    0.00000	    0.00000	    0.00000
                     55	    0.00000	    0.00000	    0.00000	    0.00000	    0.00000
                     60	    0.00000	    0.00000	    0.00000	    0.00000	    0.00000
              </tableData>
              <tableData breakPoint="20">
                              -10	        -5	         0	         5	        10
                    -10	  -0.14262	  -0.13463	  -0.12534	  -0.12115	  -0.11902
                     -5	  -0.19360	  -0.21079	  -0.22254	  -0.22980	  -0.22678
                     -2	  -0.18630	  -0.20146	  -0.21340	  -0.21632	  -0.21304
                      0	  -0.18326	  -0.19757	  -0.20554	  -0.21328	  -0.20733
                      2	  -0.18024	  -0.19579	  -0.20914	  -0.21299	  -0.20855
                      5	  -0.19022	  -0.20995	  -0.23026	  -0.23257	  -0.22631
                      7	  -0.20019	  -0.22048	  -0.24261	  -0.24735	  -0.24020
                     10	  -0.20935	  -0.23040	  -0.25365	  -0.26153	  -0.24754
                     11	  -0.20331	  -0.23015	  -0.25581	  -0.24971	  -0.22295
                     12	  -0.20299	  -0.22825	  -0.22768	  -0.21194	  -0.18760
                     13	  -0.20317	  -0.19953	  -0.18453	  -0.16646	  -0.15405
                     14	  -0.18300	  -0.16065	  -0.14426	  -0.12352	  -0.10868
                     15	  -0.14741	  -0.12209	  -0.10038	  -0.08126	  -0.06255
                     20	  -0.01551	  -0.01423	  -0.01056	  -0.00389	    0.00093
                     30	  -0.00280	  -0.00288	  -0.00160	    0.00137	    0.00161
                     45	  -0.00277	  -0.00272	  -0.00214	  -0.00176	  -0.00212
                     55	  -0.00229	  -0.00234	  -0.00201	  -0.00186	  -0.00265
                     60	  -0.00223	  -0.00209	  -0.00189	  -0.00176	  -0.00178
              </tableData>
              <tableData breakPoint="50">
                              -10	        -5	         0	         5	        10
                    -10	  -0.17957	  -0.17024	  -0.16117	  -0.15303	  -0.14581
                     -5	  -0.29245	  -0.29870	  -0.30158	  -0.30181	  -0.29298
                     -2	  -0.31293	  -0.33639	  -0.34880	  -0.34728	  -0.33677
                      0	  -0.30754	  -0.33333	  -0.34972	  -0.36261	  -0.35172
                      2	  -0.30415	  -0.32919	  -0.35321	  -0.36029	  -0.35162
                      5	  -0.31726	  -0.34945	  -0.38251	  -0.38610	  -0.37526
                      7	  -0.33481	  -0.36752	  -0.40388	  -0.40898	  -0.39875
                     10	  -0.35046	  -0.38794	  -0.42560	  -0.44104	  -0.41877
                     11	  -0.34228	  -0.38807	  -0.43023	  -0.42678	  -0.39498
                     12	  -0.34200	  -0.38549	  -0.39945	  -0.39087	  -0.35842
                     13	  -0.34353	  -0.35695	  -0.35206	  -0.33438	  -0.31969
                     14	  -0.32455	  -0.31315	  -0.30365	  -0.28319	  -0.26746
                     15	  -0.28647	  -0.26896	  -0.25373	  -0.23642	  -0.21811
                     20	  -0.09806	  -0.07430	  -0.05608	  -0.04014	  -0.02883
                     30	  -0.00616	  -0.00607	  -0.00459	    0.00115	    0.00252
                     45	  -0.00556	  -0.00535	  -0.00430	  -0.00349	  -0.00393
                     55	  -0.00485	  -0.00471	  -0.00409	  -0.00380	  -0.00450
                     60	  -0.00466	  -0.00434	  -0.00390	  -0.00361	  -0.00356
              </tableData>
          </table>
       </product>
    </function>
    <function name="aero/c/CFZDSPR">
    <description>LIFT INCREMENT DUE TO SPOILERS RIGHT</description>
    <product>
          <table>
            <independentVar lookup="row">aero/alpha-deg</independentVar>
            <independentVar lookup="column">aero/beta-deg</independentVar>
            <independentVar lookup="table">fcs/speedbrake-right-deg</independentVar>
              <tableData breakPoint="0">
                              -10	        -5	         0	         5	        10
                    -10	    0.00000	    0.00000	    0.00000	    0.00000	    0.00000
                     -5	    0.00000	    0.00000	    0.00000	    0.00000	    0.00000
                     -2	    0.00000	    0.00000	    0.00000	    0.00000	    0.00000
                      0	    0.00000	    0.00000	    0.00000	    0.00000	    0.00000
                      2	    0.00000	    0.00000	    0.00000	    0.00000	    0.00000
                      5	    0.00000	    0.00000	    0.00000	    0.00000	    0.00000
                      7	    0.00000	    0.00000	    0.00000	    0.00000	    0.00000
                     10	    0.00000	    0.00000	    0.00000	    0.00000	    0.00000
                     11	    0.00000	    0.00000	    0.00000	    0.00000	    0.00000
                     12	    0.00000	    0.00000	    0.00000	    0.00000	    0.00000
                     13	    0.00000	    0.00000	    0.00000	    0.00000	    0.00000
                     14	    0.00000	    0.00000	    0.00000	    0.00000	    0.00000
                     15	    0.00000	    0.00000	    0.00000	    0.00000	    0.00000
                     20	    0.00000	    0.00000	    0.00000	    0.00000	    0.00000
                     30	    0.00000	    0.00000	    0.00000	    0.00000	    0.00000
                     45	    0.00000	    0.00000	    0.00000	    0.00000	    0.00000
                     55	    0.00000	    0.00000	    0.00000	    0.00000	    0.00000
                     60	    0.00000	    0.00000	    0.00000	    0.00000	    0.00000
              </tableData>
              <tableData breakPoint="20">
                              -10	        -5	         0	         5	        10
                    -10	  -0.11902	  -0.12115	  -0.12534	  -0.13463	  -0.14262
                     -5	  -0.22678	  -0.22980	  -0.22254	  -0.21079	  -0.19360
                     -2	  -0.21304	  -0.21632	  -0.21340	  -0.20146	  -0.18630
                      0	  -0.20733	  -0.21328	  -0.20554	  -0.19757	  -0.18326
                      2	  -0.20855	  -0.21299	  -0.20914	  -0.19579	  -0.18024
                      5	  -0.22717	  -0.23257	  -0.23026	  -0.20995	  -0.18936
                      7	  -0.24023	  -0.24735	  -0.24261	  -0.22048	  -0.20016
                     10	  -0.24754	  -0.26153	  -0.25365	  -0.23040	  -0.20935
                     11	  -0.22295	  -0.24971	  -0.25581	  -0.23015	  -0.20331
                     12	  -0.18760	  -0.21194	  -0.22768	  -0.22825	  -0.20299
                     13	  -0.15401	  -0.16644	  -0.18453	  -0.19955	  -0.20321
                     14	  -0.10868	  -0.12352	  -0.14426	  -0.16065	  -0.18300
                     15	  -0.06255	  -0.08126	  -0.10038	  -0.12209	  -0.14741
                     20	    0.00393	  -0.00419	  -0.01056	  -0.01393	  -0.01851
                     30	    0.00162	    0.00137	  -0.00160	  -0.00288	  -0.00281
                     45	  -0.00187	  -0.00176	  -0.00214	  -0.00272	  -0.00302
                     55	  -0.00203	  -0.00186	  -0.00201	  -0.00234	  -0.00291
                     60	  -0.00178	  -0.00176	  -0.00189	  -0.00209	  -0.00223
              </tableData>
              <tableData breakPoint="50">
                              -10	        -5	         0	         5	        10
                    -10	  -0.14581	  -0.15303	  -0.16117	  -0.17024	  -0.17957
                     -5	  -0.29298	  -0.30181	  -0.30158	  -0.29870	  -0.29245
                     -2	  -0.33677	  -0.34728	  -0.34880	  -0.33639	  -0.31293
                      0	  -0.35172	  -0.36261	  -0.34972	  -0.33333	  -0.30754
                      2	  -0.35162	  -0.36029	  -0.35321	  -0.32919	  -0.30415
                      5	  -0.37612	  -0.38610	  -0.38251	  -0.34945	  -0.31640
                      7	  -0.39878	  -0.40898	  -0.40388	  -0.36752	  -0.33478
                     10	  -0.41877	  -0.44104	  -0.42560	  -0.38794	  -0.35046
                     11	  -0.39498	  -0.42678	  -0.43023	  -0.38807	  -0.34228
                     12	  -0.35842	  -0.39087	  -0.39945	  -0.38549	  -0.34200
                     13	  -0.31965	  -0.33436	  -0.35206	  -0.35697	  -0.34357
                     14	  -0.26746	  -0.28319	  -0.30365	  -0.31315	  -0.32455
                     15	  -0.21811	  -0.23642	  -0.25373	  -0.26896	  -0.28647
                     20	  -0.02583	  -0.04044	  -0.05608	  -0.07400	  -0.10106
                     30	    0.00253	    0.00115	  -0.00459	  -0.00607	  -0.00617
                     45	  -0.00368	  -0.00349	  -0.00430	  -0.00535	  -0.00581
                     55	  -0.00388	  -0.00380	  -0.00409	  -0.00471	  -0.00547
                     60	  -0.00356	  -0.00361	  -0.00390	  -0.00434	  -0.00466
              </tableData>
          </table>
       </product>
    </function>
    <function name="aero/c/CMM1">
    <description>BASE PITCHING MOMENT</description>
    <product>
          <table>
            <independentVar lookup="row">aero/alpha-deg</independentVar>
            <independentVar lookup="column">fcs/pitch-pos-deg</independentVar>
            <tableData>
                                -17	        -10	         -4	          0	          3	         10	         17	         23	         30
                    -10	    0.01725	    0.23068	    0.42703	    0.56318	    0.66336	    0.90200	    1.12483	    1.26851	    1.34037
                     -5	  -0.29968	  -0.09455	    0.09441	    0.22401	    0.32286	    0.55366	    0.77259	    0.94023	    1.04737
                     -2	  -0.46133	  -0.26040	  -0.07392	    0.05311	    0.14967	    0.37672	    0.59299	    0.75973	    0.92175
                      0	  -0.57427	  -0.36420	  -0.17473	  -0.04858	    0.04570	    0.26624	    0.47589	    0.63663	    0.79217
                      2	  -0.68173	  -0.46809	  -0.27547	  -0.14686	  -0.05152	    0.16727	    0.37409	    0.53249	    0.68660
                      5	  -0.84324	  -0.62688	  -0.43045	  -0.29866	  -0.20092	    0.02252	    0.23047	    0.38903	    0.54306
                      7	  -0.94960	  -0.73291	  -0.53293	  -0.40265	  -0.30363	  -0.07836	    0.13146	    0.29286	    0.44820
                     10	  -1.11905	  -0.90428	  -0.70606	  -0.57263	  -0.47261	  -0.24379	  -0.02991	    0.13284	    0.29002
                     11	  -1.18590	  -0.96838	  -0.76851	  -0.63275	  -0.53189	  -0.30126	  -0.08665	    0.07803	    0.23635
                     12	  -1.21875	  -1.00169	  -0.80160	  -0.66586	  -0.56473	  -0.33482	  -0.11826	    0.04580	    0.20496
                     13	  -1.24541	  -1.02697	  -0.82433	  -0.68962	  -0.58782	  -0.35660	  -0.13882	    0.02656	    0.18703
                     14	  -1.12687	  -1.05498	  -0.85455	  -0.71736	  -0.61493	  -0.38078	  -0.16120	    0.00493	    0.16676
                     15	  -1.27738	  -1.08704	  -0.88482	  -0.74802	  -0.64368	  -0.40915	  -0.18804	  -0.01931	    0.14398
                     20	  -1.24492	  -1.19529	  -1.07292	  -0.93224	  -0.82883	  -0.58499	  -0.35741	  -0.18205	  -0.01157
                     30	  -1.06337	  -1.05338	  -1.04400	  -1.03651	  -1.03014	  -0.99003	  -0.86680	  -0.68227	  -0.50031
                     45	  -0.70747	  -0.70046	  -0.69254	  -0.68336	  -0.68165	  -0.66863	  -0.65425	  -0.64127	  -0.62647
                     55	  -0.50019	  -0.49528	  -0.48944	  -0.52352	  -0.48077	  -0.47119	  -0.45901	  -0.44898	  -0.43801
                     60	  -0.41420	  -0.41040	  -0.40563	  -0.40168	  -0.39820	  -0.38908	  -0.37898	  -0.37008	  -0.36033
            </tableData>
          </table>
       </product>
    </function>
    <function name="aero/c/CMMALPHADOT">
    <description>PITCH MOMENT DERIVATIVE FOR ALPHA DOT</description>
    <product>
          <property>aero/alphadot-rad_sec</property>
          <table>
            <independentVar lookup="row">aero/alpha-deg</independentVar>
            <tableData>
                    -10		  -4.75511
                     -5		  -4.76318
                     -2		  -4.35208
                      0		  -3.37527
                      2		  -3.62110
                      5		  -3.33277
                      7		  -2.23434
                     10		  -3.84583
                     11		  -2.77293
                     12		  -1.56020
                     13		  -1.71537
                     14		  -2.00934
                     15		  -2.25899
                     20		  -2.86771
                     30		    1.51506
                     45		    1.22518
                     55		    1.00759
                     60		    0.89195
            </tableData>
          </table>
       </product>
    </function>
    <function name="aero/c/CMMBETADOT">
    <description>PITCH MOMENT DERIVATIVE FOR BETA DOT</description>
    <product>
          <property>aero/betadot-rad_sec</property>
          <table>
            <independentVar lookup="row">aero/alpha-deg</independentVar>
            <tableData>
                    -10		    1.77865
                     -5		    0.16568
                     -2		  -0.45040
                      0		    0.12932
                      2		    0.31216
                      5		  -0.04293
                      7		  -0.88353
                     10		    0.12357
                     11		    0.08539
                     12		  -0.19587
                     13		  -0.15465
                     14		  -0.23854
                     15		  -0.32750
                     20		  -0.26960
                     30		    0.02541
                     45		    0.04691
                     55		    0.02971
                     60		  -0.03633
            </tableData>
          </table>
       </product>
    </function>
    <function name="aero/c/CMMDAD">
    <description>PITCH MOMENT DUE TO AILERON DEFLECTION</description>
    <product>
          <property>fcs/roll-pos-deg</property>
          <table>
            <independentVar lookup="row">aero/alpha-deg</independentVar>
            <independentVar lookup="column">aero/beta-deg</independentVar>
            <tableData>
                                -10	         -5	          0	          5	         10
                    -10	    0.00169	    0.00163	    0.00151	    0.00137	    0.00111
                     -5	    0.00062	    0.00042	    0.00021	  -0.00016	  -0.00030
                     -2	    0.00055	    0.00023	  -0.00014	  -0.00045	  -0.00074
                      0	    0.00070	    0.00030	    0.00004	  -0.00044	  -0.00073
                      2	    0.00069	    0.00048	    0.00013	  -0.00029	  -0.00066
                      5	    0.00007	  -0.00015	  -0.00038	  -0.00058	  -0.00063
                      7	  -0.00046	  -0.00067	  -0.00087	  -0.00108	  -0.00115
                     10	  -0.00193	  -0.00202	  -0.00171	  -0.00157	  -0.00166
                     11	  -0.00199	  -0.00225	  -0.00231	  -0.00160	  -0.00115
                     12	  -0.00207	  -0.00226	  -0.00190	  -0.00154	  -0.00092
                     13	  -0.00204	  -0.00170	  -0.00141	  -0.00132	  -0.00104
                     14	  -0.00168	  -0.00127	  -0.00117	  -0.00108	  -0.00134
                     15	  -0.00122	  -0.00104	  -0.00094	  -0.00084	  -0.00078
                     20	  -0.00013	  -0.00016	  -0.00008	  -0.00012	  -0.00056
                     30	  -0.00016	  -0.00013	  -0.00005	    0.00004	    0.00007
                     45	  -0.00004	  -0.00008	  -0.00002	    0.00001	    0.00027
                     55	  -0.00004	  -0.00004	  -0.00002	  -0.00002	    0.00047
                     60	  -0.00003	  -0.00004	  -0.00003	  -0.00003	  -0.00003
            </tableData>
          </table>
       </product>
    </function>
    <function name="aero/c/CMMDFM">
    <description>PITCHING MOMENT INCREMENT DUE TO FLAPS</description>
    <product>
          <property>fcs/flap-pos-deg</property>
          <table>
            <independentVar lookup="row">aero/alpha-deg</independentVar>
            <independentVar lookup="column">aero/beta-deg</independentVar>
            <tableData>
                                -10	         -5	          0	          5	         10
                    -10	  -0.42192	  -0.43368	  -0.43185	  -0.43368	  -0.42192
                     -5	  -0.46505	  -0.47947	  -0.49085	  -0.47947	  -0.46505
                     -2	  -0.51535	  -0.51193	  -0.52564	  -0.51193	  -0.51535
                      0	  -0.53326	  -0.53714	  -0.54921	  -0.53714	  -0.53326
                      2	  -0.55345	  -0.58202	  -0.57699	  -0.58203	  -0.55345
                      5	  -0.57413	  -0.63718	  -0.60783	  -0.63718	  -0.57790
                      7	  -0.53320	  -0.63053	  -0.59367	  -0.63057	  -0.53414
                     10	  -0.39886	  -0.38475	  -0.40315	  -0.38475	  -0.39886
                     11	  -0.39321	  -0.39704	  -0.36983	  -0.39704	  -0.39321
                     12	  -0.41629	  -0.32481	  -0.33432	  -0.32480	  -0.41629
                     13	  -0.35574	  -0.32849	  -0.32780	  -0.32838	  -0.35569
                     14	  -0.32260	  -0.30881	  -0.29934	  -0.30881	  -0.32260
                     15	  -0.29276	  -0.28063	  -0.28591	  -0.28063	  -0.29276
                     20	  -0.21536	  -0.20284	  -0.20060	  -0.20389	  -0.20246
                     30	  -0.33590	  -0.33691	  -0.32467	  -0.33691	  -0.33589
                     45	  -0.24273	  -0.25142	  -0.25832	  -0.25139	  -0.24933
                     55	  -0.21713	  -0.23455	  -0.22829	  -0.23455	  -0.22921
                     60	  -0.21459	  -0.22268	  -0.22351	  -0.22268	  -0.21459
            </tableData>
          </table>
       </product>
    </function>
    <function name="aero/c/CMMDRD">
    <description>PITCH MOMENT DUE TO RUDDER DEFLECTION</description>
    <product>
          <property>fcs/rudder-pos-deg</property>
          <table>
            <independentVar lookup="row">aero/alpha-deg</independentVar>
            <independentVar lookup="column">aero/beta-deg</independentVar>
            <tableData>
                                -10	         -5	          0	          5	         10
                    -10	  -0.00002	  -0.00066	    0.00222	  -0.00163	  -0.00157
                     -5	  -0.00064	  -0.00275	  -0.00441	  -0.00124	  -0.00114
                     -2	  -0.00034	  -0.00143	  -0.00334	  -0.00096	  -0.00102
                      0	  -0.00007	  -0.00047	  -0.00093	  -0.00088	  -0.00107
                      2	    0.00025	    0.00053	    0.00049	  -0.00063	  -0.00090
                      5	    0.00018	    0.00103	    0.00064	  -0.00070	  -0.00100
                      7	    0.00059	    0.00069	  -0.00062	  -0.00073	  -0.00085
                     10	    0.00099	    0.00032	    0.00048	  -0.00079	  -0.00169
                     11	    0.00138	    0.00017	    0.00057	  -0.00076	  -0.00110
                     12	    0.00089	    0.00024	    0.00070	  -0.00077	  -0.00100
                     13	    0.00102	    0.00103	    0.00075	  -0.00038	  -0.00102
                     14	    0.00091	    0.00054	    0.00075	  -0.00015	  -0.00115
                     15	    0.00054	  -0.00095	    0.00051	  -0.00036	  -0.00080
                     20	  -0.00071	  -0.00004	    0.00048	  -0.00030	  -0.00145
                     30	  -0.00076	  -0.00116	  -0.00147	    0.00062	    0.00052
                     45	  -0.00011	  -0.00033	  -0.00014	    0.00023	    0.00038
                     55	    0.00004	  -0.00002	   0.00000	    0.00002	    0.00042
                     60	  -0.00001	   0.00000	   0.00000	    0.00000	  -0.00004
            </tableData>
          </table>
       </product>
    </function>
    <function name="aero/c/CMMDSM">
    <description>PITCHING MOMENT INCREMENT DUE TO SLATS</description>
    <product>
          <property>fcs/slat-pos-deg</property>
          <table>
            <independentVar lookup="row">aero/alpha-deg</independentVar>
            <independentVar lookup="column">aero/beta-deg</independentVar>
            <tableData>
                                -10	         -5	          0	          5	         10
                    -10	  -0.29758	  -0.30520	  -0.30691	  -0.30520	  -0.29758
                     -5	  -0.19480	  -0.20551	  -0.20775	  -0.20551	  -0.19480
                     -2	  -0.16002	  -0.15734	  -0.16077	  -0.15734	  -0.16002
                      0	  -0.13142	  -0.13216	  -0.13455	  -0.13216	  -0.13142
                      2	  -0.10300	  -0.10926	  -0.10717	  -0.10927	  -0.10300
                      5	  -0.05295	  -0.07063	  -0.05147	  -0.07063	  -0.05672
                      7	  -0.00781	  -0.02704	  -0.01007	  -0.02708	  -0.00875
                     10	    0.11239	    0.06875	    0.06979	    0.06875	    0.11239
                     11	    0.09437	    0.11186	    0.13148	    0.11186	    0.09437
                     12	    0.12390	    0.14494	    0.15492	    0.14495	    0.12390
                     13	    0.15343	    0.15968	    0.16433	    0.15979	    0.15348
                     14	    0.17529	    0.17238	    0.17030	    0.17238	    0.17529
                     15	    0.17494	    0.17750	    0.18068	    0.17750	    0.17494
                     20	    0.21034	    0.20784	    0.20532	    0.20679	    0.22324
                     30	    0.05001	    0.05283	    0.05912	    0.05283	    0.05002
                     45	    0.05752	    0.06174	    0.06224	    0.06177	    0.05092
                     55	    0.06883	    0.06453	    0.06167	    0.06453	    0.05675
                     60	    0.06061	    0.05948	    0.05937	    0.05948	    0.06061
            </tableData>
          </table>
       </product>
    </function>
    <function name="aero/c/CMMDSPL">
    <description>PITCHING MOMENT INCREMENT DUE TO SPOILERS LEFT</description>
    <product>
          <table>
            <independentVar lookup="row">aero/alpha-deg</independentVar>
            <independentVar lookup="column">aero/beta-deg</independentVar>
            <independentVar lookup="table">fcs/speedbrake-left-deg</independentVar>
              <tableData breakPoint="0">
                              -10	        -5	         0	         5	        10
                    -10	    0.00000	    0.00000	    0.00000	    0.00000	    0.00000
                     -5	    0.00000	    0.00000	    0.00000	    0.00000	    0.00000
                     -2	    0.00000	    0.00000	    0.00000	    0.00000	    0.00000
                      0	    0.00000	    0.00000	    0.00000	    0.00000	    0.00000
                      2	    0.00000	    0.00000	    0.00000	    0.00000	    0.00000
                      5	    0.00000	    0.00000	    0.00000	    0.00000	    0.00000
                      7	    0.00000	    0.00000	    0.00000	    0.00000	    0.00000
                     10	    0.00000	    0.00000	    0.00000	    0.00000	    0.00000
                     11	    0.00000	    0.00000	    0.00000	    0.00000	    0.00000
                     12	    0.00000	    0.00000	    0.00000	    0.00000	    0.00000
                     13	    0.00000	    0.00000	    0.00000	    0.00000	    0.00000
                     14	    0.00000	    0.00000	    0.00000	    0.00000	    0.00000
                     15	    0.00000	    0.00000	    0.00000	    0.00000	    0.00000
                     20	    0.00000	    0.00000	    0.00000	    0.00000	    0.00000
                     30	    0.00000	    0.00000	    0.00000	    0.00000	    0.00000
                     45	    0.00000	    0.00000	    0.00000	    0.00000	    0.00000
                     55	    0.00000	    0.00000	    0.00000	    0.00000	    0.00000
                     60	    0.00000	    0.00000	    0.00000	    0.00000	    0.00000
              </tableData>
              <tableData breakPoint="20">
                              -10	        -5	         0	         5	        10
                    -10	    0.07875	    0.07058	    0.05683	    0.03790	    0.01357
                     -5	    0.10910	    0.11631	    0.11807	    0.10759	    0.07419
                     -2	    0.10783	    0.11855	    0.12106	    0.10787	    0.07322
                      0	    0.11049	    0.12357	    0.12440	    0.11426	    0.07977
                      2	    0.11321	    0.12400	    0.13496	    0.12054	    0.08330
                      5	    0.12438	    0.14093	    0.16194	    0.14769	    0.08954
                      7	    0.13894	    0.15295	    0.17865	    0.14977	    0.09174
                     10	    0.14783	    0.16028	    0.17488	    0.14791	    0.08618
                     11	    0.13627	    0.15518	    0.17242	    0.13444	    0.05844
                     12	    0.13945	    0.15527	    0.14666	    0.10532	    0.03931
                     13	    0.13816	    0.13615	    0.12357	    0.08597	    0.02948
                     14	    0.12578	    0.11948	    0.10727	    0.06930	    0.01557
                     15	    0.10896	    0.10751	    0.09125	    0.05796	  -0.00217
                     20	    0.06406	    0.05942	    0.04463	    0.01483	  -0.00810
                     30	    0.01456	    0.01526	    0.01112	    0.00113	    0.00262
                     45	    0.00735	    0.00862	    0.00720	    0.00655	    0.00226
                     55	    0.00518	    0.00619	    0.00616	    0.00564	  -0.00554
                     60	    0.00375	    0.00523	    0.00548	    0.00551	    0.00664
              </tableData>
              <tableData breakPoint="50">
                              -10	        -5	         0	         5	        10
                    -10	    0.10257	    0.08909	    0.06776	    0.03547	  -0.00499
                     -5	    0.16279	    0.16174	    0.15837	    0.13194	    0.07765
                     -2	    0.17962	    0.19708	    0.19821	    0.17158	    0.11065
                      0	    0.18464	    0.20758	    0.21395	    0.19576	    0.13232
                      2	    0.18967	    0.20900	    0.23212	    0.20641	    0.13853
                      5	    0.20644	    0.23384	    0.27206	    0.24295	    0.14556
                      7	    0.22580	    0.25101	    0.29431	    0.24298	    0.14854
                     10	    0.24914	    0.26901	    0.29262	    0.25790	    0.14227
                     11	    0.22842	    0.26252	    0.28499	    0.22340	    0.10767
                     12	    0.23262	    0.26098	    0.25330	    0.19026	    0.08115
                     13	    0.23271	    0.23880	    0.22182	    0.15867	    0.06425
                     14	    0.22001	    0.21536	    0.19818	    0.13389	    0.04627
                     15	    0.19878	    0.19916	    0.17501	    0.12073	    0.03067
                     20	    0.13666	    0.12806	    0.10013	    0.05471	    0.01548
                     30	    0.02979	    0.03075	    0.02652	    0.00755	    0.00711
                     45	    0.01484	    0.01619	    0.01373	    0.01260	    0.01028
                     55	    0.01076	    0.01194	    0.01209	    0.01048	    0.00116
                     60	    0.00766	    0.01037	    0.01065	    0.01091	    0.01333
              </tableData>
          </table>
       </product>
    </function>
    <function name="aero/c/CMMDSPR">
    <description>PITCHING MOMENT INCREMENT DUE TO SPOILERS RIGHT</description>
    <product>
          <table>
            <independentVar lookup="row">aero/alpha-deg</independentVar>
            <independentVar lookup="column">aero/beta-deg</independentVar>
            <independentVar lookup="table">fcs/speedbrake-right-deg</independentVar>
              <tableData breakPoint="0">
                              -10	        -5	         0	         5	        10
                    -10	    0.00000	    0.00000	    0.00000	    0.00000	    0.00000
                     -5	    0.00000	    0.00000	    0.00000	    0.00000	    0.00000
                     -2	    0.00000	    0.00000	    0.00000	    0.00000	    0.00000
                      0	    0.00000	    0.00000	    0.00000	    0.00000	    0.00000
                      2	    0.00000	    0.00000	    0.00000	    0.00000	    0.00000
                      5	    0.00000	    0.00000	    0.00000	    0.00000	    0.00000
                      7	    0.00000	    0.00000	    0.00000	    0.00000	    0.00000
                     10	    0.00000	    0.00000	    0.00000	    0.00000	    0.00000
                     11	    0.00000	    0.00000	    0.00000	    0.00000	    0.00000
                     12	    0.00000	    0.00000	    0.00000	    0.00000	    0.00000
                     13	    0.00000	    0.00000	    0.00000	    0.00000	    0.00000
                     14	    0.00000	    0.00000	    0.00000	    0.00000	    0.00000
                     15	    0.00000	    0.00000	    0.00000	    0.00000	    0.00000
                     20	    0.00000	    0.00000	    0.00000	    0.00000	    0.00000
                     30	    0.00000	    0.00000	    0.00000	    0.00000	    0.00000
                     45	    0.00000	    0.00000	    0.00000	    0.00000	    0.00000
                     55	    0.00000	    0.00000	    0.00000	    0.00000	    0.00000
                     60	    0.00000	    0.00000	    0.00000	    0.00000	    0.00000
              </tableData>
              <tableData breakPoint="20">
                              -10	        -5	         0	         5	        10
                    -10	    0.01357	    0.03790	    0.05683	    0.07058	    0.07875
                     -5	    0.07419	    0.10759	    0.11807	    0.11631	    0.10910
                     -2	    0.07322	    0.10787	    0.12106	    0.11855	    0.10783
                      0	    0.07977	    0.11426	    0.12440	    0.12357	    0.11049
                      2	    0.08330	    0.12055	    0.13496	    0.12399	    0.11321
                      5	    0.09331	    0.14769	    0.16194	    0.14093	    0.12061
                      7	    0.09268	    0.14981	    0.17865	    0.15291	    0.13800
                     10	    0.08618	    0.14791	    0.17488	    0.16028	    0.14783
                     11	    0.05844	    0.13444	    0.17242	    0.15518	    0.13627
                     12	    0.03931	    0.10531	    0.14666	    0.15528	    0.13945
                     13	    0.02943	    0.08586	    0.12357	    0.13626	    0.13821
                     14	    0.01557	    0.06930	    0.10727	    0.11948	    0.12578
                     15	  -0.00217	    0.05796	    0.09125	    0.10751	    0.10896
                     20	  -0.02100	    0.01588	    0.04463	    0.05837	    0.07696
                     30	    0.00261	    0.00113	    0.01112	    0.01526	    0.01457
                     45	    0.00886	    0.00652	    0.00720	    0.00865	    0.00075
                     55	    0.00654	    0.00564	    0.00616	    0.00619	  -0.00690
                     60	    0.00664	    0.00551	    0.00548	    0.00523	    0.00375
              </tableData>
              <tableData breakPoint="50">
                              -10	        -5	         0	         5	        10
                    -10	  -0.00499	    0.03547	    0.06776	    0.08909	    0.10257
                     -5	    0.07765	    0.13194	    0.15837	    0.16174	    0.16279
                     -2	    0.11065	    0.17158	    0.19821	    0.19708	    0.17962
                      0	    0.13232	    0.19576	    0.21395	    0.20758	    0.18464
                      2	    0.13853	    0.20642	    0.23212	    0.20899	    0.18967
                      5	    0.14933	    0.24295	    0.27206	    0.23384	    0.20267
                      7	    0.14948	    0.24302	    0.29431	    0.25097	    0.22486
                     10	    0.14227	    0.25790	    0.29262	    0.26901	    0.24914
                     11	    0.10767	    0.22340	    0.28499	    0.26252	    0.22842
                     12	    0.08115	    0.19025	    0.25330	    0.26099	    0.23262
                     13	    0.06420	    0.15856	    0.22182	    0.23891	    0.23276
                     14	    0.04627	    0.13389	    0.19818	    0.21536	    0.22001
                     15	    0.03067	    0.12073	    0.17501	    0.19916	    0.19878
                     20	    0.00258	    0.05576	    0.10013	    0.12701	    0.14956
                     30	    0.00710	    0.00755	    0.02652	    0.03075	    0.02980
                     45	    0.01688	    0.01257	    0.01373	    0.01622	    0.00824
                     55	    0.01324	    0.01048	    0.01209	    0.01194	  -0.00132
                     60	    0.01333	    0.01091	    0.01065	    0.01037	    0.00766
              </tableData>
          </table>
       </product>
    </function>
    <function name="aero/c/CMMQ">
    <description>PITCH DAMPING DERIVATIVE</description>
    <product>
          <property>aero/qb</property>
          <table>
            <independentVar lookup="row">aero/alpha-deg</independentVar>
            <tableData>
                    -10		 -34.66611
                     -5		 -35.80079
                     -2		 -31.95517
                      0		 -33.56489
                      2		 -34.83892
                      5		 -38.29969
                      7		 -39.80739
                     10		 -35.69304
                     11		 -32.13610
                     12		 -29.28698
                     13		 -26.99813
                     14		 -24.28529
                     15		 -21.45571
                     20		  -5.62008
                     30		    4.06472
                     45		    4.92497
                     55		    4.94392
                     60		    5.03721
            </tableData>
          </table>
       </product>
    </function>
    <function name="aero/c/CML1">
    <description>BASE ROLLING MOMENT</description>
    <product>
          <table>
            <independentVar lookup="row">aero/alpha-deg</independentVar>
            <independentVar lookup="column">aero/beta-deg</independentVar>
            <tableData>
                                -10	         -5	          0	          5	         10
                    -10	    0.00553	    0.00327	    0.00000	  -0.00327	  -0.00553
                     -5	  -0.00630	  -0.00287	    0.00000	    0.00287	    0.00630
                     -2	  -0.01201	  -0.00579	    0.00000	    0.00579	    0.01201
                      0	  -0.01534	  -0.00756	    0.00000	    0.00756	    0.01534
                      2	  -0.01972	  -0.00970	    0.00000	    0.00970	    0.01972
                      5	  -0.02781	  -0.01379	    0.00000	    0.01379	    0.02745
                      7	  -0.03378	  -0.01686	    0.00000	    0.01686	    0.03370
                     10	  -0.04266	  -0.02196	    0.00000	    0.02196	    0.04266
                     11	  -0.03536	  -0.01809	    0.00000	    0.01809	    0.03536
                     12	  -0.02479	  -0.00773	    0.00000	    0.00773	    0.02479
                     13	  -0.01363	  -0.00402	    0.00000	    0.00402	    0.01363
                     14	  -0.00808	  -0.00334	    0.00000	    0.00334	    0.00808
                     15	  -0.00723	  -0.00301	    0.00005	    0.00301	    0.00723
                     20	  -0.00732	  -0.00318	    0.00000	    0.00316	    0.00726
                     30	  -0.00823	  -0.00409	    0.00000	    0.00409	    0.00823
                     45	  -0.01189	  -0.00582	    0.00000	    0.00582	    0.01198
                     55	  -0.01436	  -0.00704	    0.00000	    0.00704	    0.01466
                     60	  -0.01555	  -0.00755	    0.00000	    0.00755	    0.01555
            </tableData>
          </table>
       </product>
    </function>
    <function name="aero/c/CMLBETADOT">
    <description>ROLL MOMENT DERIVATIVE FOR BETA DOT</description>
    <product>
          <property>aero/betadot-rad_sec</property>
          <table>
            <independentVar lookup="row">aero/alpha-deg</independentVar>
            <tableData>
                    -10		    0.03382
                     -5		  -0.03884
                      2		  -0.10714
                     10		  -0.23718
                     13		  -0.03995
                     20		  -0.02893
                     55		  -0.08573
                     60		  -0.09053
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            </tableData>
          </table>
       </product>
    </function>
    <function name="aero/c/CMLDAD">
    <description>ROLLING MOMENT DUE TO AILERON DEFLECTION</description>
    <product>
          <property>fcs/roll-pos-deg</property>
          <table>
            <independentVar lookup="row">aero/alpha-deg</independentVar>
            <independentVar lookup="column">aero/beta-deg</independentVar>
            <tableData>
                                -10	         -5	          0	          5	         10
                    -10	    0.00182	    0.00178	    0.00171	    0.00163	    0.00155
                      0	    0.00203	    0.00206	    0.00205	    0.00206	    0.00199
                      7	    0.00164	    0.00177	    0.00188	    0.00199	    0.00208
                     12	    0.00104	    0.00113	    0.00093	    0.00088	    0.00107
                     15	    0.00058	    0.00048	    0.00041	    0.00036	    0.00032
                     45	    0.00005	    0.00005	    0.00005	    0.00005	    0.00005
                     60	    0.00004	    0.00004	    0.00004	    0.00003	    0.00003
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            </tableData>
          </table>
       </product>
    </function>
    <function name="aero/c/CMLDFM">
    <description>ROLLING MOMENT INCREMENT DUE TO FLAPS</description>
    <product>
          <property>fcs/flap-pos-deg</property>
          <table>
            <independentVar lookup="row">aero/alpha-deg</independentVar>
            <independentVar lookup="column">aero/beta-deg</independentVar>
            <tableData>
                                -10	         -5	          0	          5	         10
                    -10	  -0.00996	  -0.00490	    0.00000	    0.00490	    0.00996
                      0	  -0.02158	  -0.01061	    0.00000	    0.01061	    0.02158
                      7	    0.00268	    0.00640	    0.00000	  -0.00640	  -0.00260
                     12	    0.01959	    0.00571	    0.00000	  -0.00571	  -0.01959
                     15	    0.00187	    0.00116	  -0.00005	  -0.00116	  -0.00187
                     45	  -0.00468	  -0.00221	    0.00000	    0.00221	    0.00459
                     60	  -0.00865	  -0.00429	    0.00000	    0.00429	    0.00865
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            </tableData>
          </table>
       </product>
    </function>
    <function name="aero/c/CMLDRD">
    <description>ROLLING MOMENT DUE TO RUDDER DEFLECTION</description>
    <product>
          <property>fcs/rudder-pos-deg</property>
          <table>
            <independentVar lookup="row">aero/alpha-deg</independentVar>
            <independentVar lookup="column">aero/beta-deg</independentVar>
            <tableData>
                                -10	         -5	          0	          5	         10
                    -10	    0.00029	    0.00036	    0.00034	    0.00034	    0.00037
                      0	    0.00032	    0.00034	    0.00030	    0.00030	    0.00034
                      7	    0.00029	    0.00026	    0.00023	    0.00022	    0.00026
                     12	    0.00022	    0.00019	    0.00017	    0.00017	    0.00020
                     15	    0.00021	    0.00027	    0.00017	    0.00016	    0.00019
                     45	    0.00005	    0.00004	    0.00005	    0.00005	    0.00006
                     60	   0.00000	    0.00000	    0.00000	    0.00000	    0.00000
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            </tableData>
          </table>
       </product>
    </function>
    <function name="aero/c/CMLDSM">
    <description>ROLLING MOMENT INCREMENT DUE TO SLATS</description>
    <product>
          <property>fcs/slat-pos-deg</property>
          <table>
            <independentVar lookup="row">aero/alpha-deg</independentVar>
            <independentVar lookup="column">aero/beta-deg</independentVar>
            <tableData>
                                -10	         -5	          0	          5	         10
                    -10	  -0.00699	  -0.00349	    0.00000	    0.00349	    0.00699
                      0	  -0.01688	  -0.00838	    0.00000	    0.00838	    0.01688
                      7	  -0.01864	  -0.00926	    0.00000	    0.00926	    0.01872
                     12	    0.01380	    0.00446	    0.00000	  -0.00446	  -0.01380
                     15	    0.00039	    0.00003	  -0.00005	  -0.00003	  -0.00039
                     45	  -0.00534	  -0.00269	    0.00000	    0.00269	    0.00525
                     60	  -0.00757	  -0.00374	    0.00000	    0.00374	    0.00757
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            </tableData>
          </table>
       </product>
    </function>
    <function name="aero/c/CMLDSPL">
    <description>ROLLING MOMENT INCREMENT DUE TO SPOILERS LEFT</description>
    <product>
          <table>
            <independentVar lookup="row">aero/alpha-deg</independentVar>
            <independentVar lookup="column">aero/beta-deg</independentVar>
            <independentVar lookup="table">fcs/speedbrake-left-deg</independentVar>
              <tableData breakPoint="0">
                              -10	        -5	         0	         5	        10
                    -10	    0.00000	    0.00000	    0.00000	    0.00000	    0.00000
                      0	    0.00000	    0.00000	    0.00000	    0.00000	    0.00000
                      7	    0.00000	    0.00000	    0.00000	    0.00000	    0.00000
                     12	    0.00000	    0.00000	    0.00000	    0.00000	    0.00000
                     15	    0.00000	    0.00000	    0.00000	    0.00000	    0.00000
                     45	    0.00000	    0.00000	    0.00000	    0.00000	    0.00000
                     60	    0.00000	    0.00000	    0.00000	    0.00000	    0.00000
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              </tableData>
              <tableData breakPoint="20">
                              -10	        -5	         0	         5	        10
                    -10	  -0.02539	  -0.02337	  -0.02145	  -0.02112	  -0.02230
                      0	  -0.03656	  -0.04039	  -0.04352	  -0.04639	  -0.04736
                      7	  -0.03810	  -0.04316	  -0.04806	  -0.05066	  -0.05222
                     12	  -0.04372	  -0.04896	  -0.04539	  -0.03844	  -0.03469
                     15	  -0.02877	  -0.02283	  -0.01798	  -0.01385	  -0.01090
                     45	  -0.00169	  -0.00162	  -0.00157	  -0.00153	  -0.00159
                     60	  -0.00140	  -0.00140	  -0.00138	  -0.00134	  -0.00130
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              </tableData>
              <tableData breakPoint="50">
                              -10	        -5	         0	         5	        10
                    -10	  -0.02811	  -0.02503	  -0.02305	  -0.02212	  -0.02316
                      0	  -0.06186	  -0.06901	  -0.07470	  -0.07953	  -0.08113
                      7	  -0.06342	  -0.07186	  -0.07995	  -0.08403	  -0.08666
                     12	  -0.07336	  -0.08240	  -0.08181	  -0.07527	  -0.07139
                     15	  -0.05877	  -0.05341	  -0.05091	  -0.04812	  -0.04592
                     45	  -0.00315	  -0.00298	  -0.00285	  -0.00276	  -0.00276
                     60	  -0.00277	  -0.00274	  -0.00265	  -0.00255	  -0.00246
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              </tableData>
          </table>
       </product>
    </function>
    <function name="aero/c/CMLDSPR">
    <description>ROLLING MOMENT INCREMENT DUE TO SPOILERS RIGHT</description>
    <product>
          <table>
            <independentVar lookup="row">aero/alpha-deg</independentVar>
            <independentVar lookup="column">aero/beta-deg</independentVar>
            <independentVar lookup="table">fcs/speedbrake-right-deg</independentVar>
              <tableData breakPoint="0">
                              -10	        -5	         0	         5	        10
                    -10	    0.00000	    0.00000	    0.00000	    0.00000	    0.00000
                      0	    0.00000	    0.00000	    0.00000	    0.00000	    0.00000
                      7	    0.00000	    0.00000	    0.00000	    0.00000	    0.00000
                     12	    0.00000	    0.00000	    0.00000	    0.00000	    0.00000
                     15	    0.00000	    0.00000	    0.00000	    0.00000	    0.00000
                     45	    0.00000	    0.00000	    0.00000	    0.00000	    0.00000
                     60	    0.00000	    0.00000	    0.00000	    0.00000	    0.00000
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              </tableData>
              <tableData breakPoint="20">
                              -10	        -5	         0	         5	        10
                    -10	    0.02230	    0.02112	    0.02145	    0.02337	    0.02539
                      0	    0.04736	    0.04639	    0.04352	    0.04039	    0.03656
                      7	    0.05230	    0.05066	    0.04806	    0.04316	    0.03818
                     12	    0.03469	    0.03844	    0.04539	    0.04896	    0.04372
                     15	    0.01090	    0.01385	    0.01788	    0.02283	    0.02877
                     45	    0.00150	    0.00153	    0.00157	    0.00162	    0.00160
                     60	    0.00130	    0.00134	    0.00138	    0.00140	    0.00140
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              </tableData>
              <tableData breakPoint="50">
                              -10	        -5	         0	         5	        10
                    -10	    0.02316	    0.02212	    0.02305	    0.02503	    0.02811
                      0	    0.08113	    0.07953	    0.07470	    0.06901	    0.06186
                      7	    0.08674	    0.08403	    0.07995	    0.07186	    0.06350
                     12	    0.07139	    0.07527	    0.08181	    0.08240	    0.07336
                     15	    0.04592	    0.04812	    0.05081	    0.05341	    0.05877
                     45	    0.00267	    0.00276	    0.00285	    0.00298	    0.00306
                     60	    0.00246	    0.00255	    0.00265	    0.00274	    0.00277
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              </tableData>
          </table>
       </product>
    </function>
    <function name="aero/c/CMLP">
    <description>ROLL DAMPING DERIVATIVE</description>
    <product>
          <property>aero/pb</property>
          <table>
            <independentVar lookup="row">aero/alpha-deg</independentVar>
            <tableData>
                    -10		  -0.54215
                     -5		  -0.69040
                      2		  -0.59851
                     10		  -0.49460
                     13		  -0.31410
                     20		    0.02924
                     55		    0.06935
                     60		    0.06172
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            </tableData>
          </table>
       </product>
    </function>
    <function name="aero/c/CMLR">
    <description>ROLLING MOMENT DUE TO YAW RATE</description>
    <product>
          <property>aero/rb</property>
          <table>
            <independentVar lookup="row">aero/alpha-deg</independentVar>
            <tableData>
                    -10		  -0.13552
                     -5		  -0.02285
                      2		    0.08843
                     10		    0.23710
                     13		    0.09272
                     20		    0.06255
                     55		    0.13289
                     60		    0.14221
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            </tableData>
          </table>
       </product>
    </function>
    <function name="aero/c/CFYB">
    <description>BASE SIDEFORCE</description>
    <product>
          <table>
            <independentVar lookup="row">aero/alpha-deg</independentVar>
            <independentVar lookup="column">aero/beta-deg</independentVar>
            <independentVar lookup="table">fcs/pitch-pos-deg</independentVar>
              <tableData breakPoint="-17">
                              -10	        -5	         0	         5	        10
                    -10	    0.06236	    0.03020	    0.00000	  -0.03020	  -0.06236
                      0	    0.07641	    0.03647	    0.00000	  -0.03647	  -0.07641
                      7	    0.06421	    0.03189	    0.00000	  -0.03189	  -0.06866
                     12	    0.06549	    0.03458	    0.00000	  -0.03463	  -0.06549
                     15	    0.06860	    0.03483	    0.00000	  -0.03483	  -0.06860
                     45	    0.03548	    0.01195	    0.00000	  -0.01198	  -0.03570
                     60	    0.01127	    0.00332	    0.00000	  -0.00332	  -0.01084
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              </tableData>
              <tableData breakPoint="-10">
                              -10	        -5	         0	         5	        10
                    -10	    0.06198	    0.03014	    0.00000	  -0.03014	  -0.06198
                      0	    0.07501	    0.03584	    0.00000	  -0.03584	  -0.07502
                      7	    0.06596	    0.03367	    0.00000	  -0.03367	  -0.06596
                     12	    0.06809	    0.03541	    0.00000	  -0.03540	  -0.06809
                     15	    0.07021	    0.03552	    0.00000	  -0.03552	  -0.07021
                     45	    0.03616	    0.01218	    0.00000	  -0.01218	  -0.02408
                     60	    0.01093	    0.00339	  -0.00003	  -0.00339	  -0.01095
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              </tableData>
              <tableData breakPoint="-4">
                              -10	        -5	         0	         5	        10
                    -10	    0.06149	    0.03005	    0.00000	  -0.03003	  -0.06149
                      0	    0.07410	    0.03538	    0.00001	  -0.03538	  -0.07410
                      7	    0.06747	    0.03510	    0.00024	  -0.03510	  -0.06747
                     12	    0.08262	    0.03627	    0.00000	  -0.03627	  -0.07037
                     15	    0.07270	    0.03661	    0.00000	  -0.03657	  -0.07270
                     45	    0.03663	    0.01246	  -0.00002	  -0.01243	  -0.03578
                     60	    0.01111	    0.00348	    0.00000	  -0.00348	  -0.01111
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              </tableData>
              <tableData breakPoint="0">
                              -10	        -5	         0	         5	        10
                    -10	    0.06098	    0.02992	    0.00007	  -0.02992	  -0.06098
                      0	    0.07337	    0.03520	    0.00000	  -0.03520	  -0.07337
                      7	    0.06840	    0.03600	    0.00000	  -0.03600	  -0.06840
                     12	    0.07169	    0.03706	    0.00000	  -0.03695	  -0.07173
                     15	    0.07437	    0.03729	    0.00000	  -0.03729	  -0.07437
                     45	    0.03703	    0.01263	  -0.00595	  -0.01263	  -0.03703
                     60	    0.01129	    0.00357	    0.00000	  -0.00352	  -0.01129
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              </tableData>
              <tableData breakPoint="3">
                              -10	        -5	         0	         5	        10
                    -10	    0.06073	    0.02981	  -0.00007	  -0.02981	  -0.05909
                      0	    0.07271	    0.03503	    0.00000	  -0.03503	  -0.07271
                      7	    0.06885	    0.03681	    0.00000	  -0.03681	  -0.06883
                     12	    0.07282	    0.03762	    0.00000	  -0.03762	  -0.07282
                     15	    0.07559	    0.03784	    0.00001	  -0.03784	  -0.07554
                     45	    0.03732	    0.01280	    0.00000	  -0.01280	  -0.03732
                     60	    0.01139	    0.00364	    0.00000	  -0.00364	  -0.01139
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              </tableData>
              <tableData breakPoint="10">
                              -10	        -5	         0	         5	        10
                    -10	    0.05960	    0.02946	    0.00000	  -0.02946	  -0.05960
                      0	    0.07077	    0.03399	    0.00000	  -0.03399	  -0.07077
                      7	    0.07037	    0.03839	    0.00000	  -0.03839	  -0.07037
                     12	    0.07601	    0.03851	    0.00000	  -0.03861	  -0.07601
                     15	    0.07795	    0.03916	    0.00000	  -0.03916	  -0.07795
                     45	    0.03814	    0.01420	    0.00000	  -0.01321	  -0.03731
                     60	    0.01163	    0.00384	    0.00000	  -0.00393	  -0.01174
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              </tableData>
              <tableData breakPoint="17">
                              -10	        -5	         0	         5	        10
                    -10	    0.05903	    0.02924	    0.00000	  -0.02924	  -0.05938
                      0	    0.07054	    0.03334	    0.00000	  -0.03334	  -0.07054
                      7	    0.07187	    0.04030	  -0.00039	  -0.04030	  -0.07189
                     12	    0.07958	    0.03836	    0.00000	  -0.03946	  -0.07959
                     15	    0.08051	    0.04028	    0.00000	  -0.04028	  -0.08051
                     45	    0.03879	    0.01366	    0.00000	  -0.01365	  -0.03902
                     60	    0.01202	    0.00407	    0.00000	  -0.00407	  -0.01202
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              </tableData>
              <tableData breakPoint="23">
                              -10	        -5	         0	         5	        10
                    -10	    0.06021	    0.03050	    0.00000	  -0.03050	  -0.06013
                      0	    0.06915	    0.03310	    0.00000	  -0.03310	  -0.06915
                      7	    0.07220	    0.04182	    0.00000	  -0.04182	  -0.07222
                     12	    0.08167	    0.04007	    0.00000	  -0.03897	  -0.08167
                     15	    0.08318	    0.04079	    0.00000	  -0.04079	  -0.08318
                     45	    0.03977	    0.01404	    0.00000	  -0.01358	  -0.03977
                     60	    0.01237	    0.00427	    0.00000	  -0.00427	  -0.01237
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              </tableData>
              <tableData breakPoint="30">
                              -10	        -5	         0	         5	        10
                    -10	    0.06151	    0.03159	    0.00000	  -0.03159	  -0.06152
                      0	    0.06776	    0.03281	    0.00000	  -0.03281	  -0.06776
                      7	    0.07307	    0.04332	    0.00000	  -0.04332	  -0.07307
                     12	    0.08317	    0.04056	    0.00000	  -0.03992	  -0.08317
                     15	    0.08470	    0.04129	    0.00000	  -0.04129	  -0.08470
                     45	    0.04060	    0.01451	    0.00000	  -0.01445	  -0.04061
                     60	    0.01278	    0.00444	    0.00000	  -0.00444	  -0.01288
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              </tableData>
          </table>
       </product>
    </function>
    <function name="aero/c/CFYDFM">
    <description>SIDEFORCE INCREMENT DUE TO FLAPS</description>
    <product>
          <property>fcs/flap-pos-deg</property>
          <table>
            <independentVar lookup="row">aero/alpha-deg</independentVar>
            <independentVar lookup="column">aero/beta-deg</independentVar>
            <tableData>
                                -10	         -5	          0	          5	         10
                    -10	    0.01051	    0.00424	    0.00000	  -0.00424	  -0.01051
                      0	  -0.00530	    0.00686	    0.00000	  -0.00686	    0.00530
                      7	  -0.00323	  -0.00125	    0.00000	    0.00125	    0.00398
                     12	    0.00407	    0.00268	    0.00000	  -0.00268	  -0.00407
                     15	  -0.00177	  -0.00993	    0.00006	    0.00993	    0.00177
                     45	    0.00342	  -0.00048	    0.00000	    0.00046	  -0.00102
                     60	    0.01097	    0.00739	  -0.00001	  -0.00739	  -0.01097
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            </tableData>
          </table>
       </product>
    </function>
    <function name="aero/c/CFYDSM">
    <description>SIDEFORCE INCREMENT DUE TO SLATS</description>
    <product>
          <property>fcs/slat-pos-deg</property>
          <table>
            <independentVar lookup="row">aero/alpha-deg</independentVar>
            <independentVar lookup="column">aero/beta-deg</independentVar>
            <tableData>
                                -10	         -5	          0	          5	         10
                    -10	    0.00526	    0.00242	    0.00000	  -0.00242	  -0.00526
                      0	  -0.00077	    0.00203	    0.00000	  -0.00203	    0.00077
                      7	    0.00048	    0.00114	    0.00000	  -0.00114	    0.00027
                     12	    0.00652	    0.00793	    0.00000	  -0.00793	  -0.00652
                     15	    0.00108	  -0.00025	    0.00006	    0.00025	  -0.00108
                     45	  -0.00285	  -0.00177	    0.00000	    0.00175	    0.00525
                     60	  -0.00522	  -0.00260	    0.00000	    0.00260	    0.00522
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            </tableData>
          </table>
       </product>
    </function>
    <function name="aero/c/CFYDSPL">
    <description>SIDEFORCE INCREMENT DUE TO SPOILERS LEFT</description>
    <product>
          <table>
            <independentVar lookup="row">aero/alpha-deg</independentVar>
            <independentVar lookup="column">aero/beta-deg</independentVar>
            <independentVar lookup="table">fcs/speedbrake-left-deg</independentVar>
              <tableData breakPoint="0">
                              -10	        -5	         0	         5	        10
                    -10	    0.00000	    0.00000	    0.00000	    0.00000	    0.00000
                      0	    0.00000	    0.00000	    0.00000	    0.00000	    0.00000
                      7	    0.00000	    0.00000	    0.00000	    0.00000	    0.00000
                     12	    0.00000	    0.00000	    0.00000	    0.00000	    0.00000
                     15	    0.00000	    0.00000	    0.00000	    0.00000	    0.00000
                     45	    0.00000	    0.00000	    0.00000	    0.00000	    0.00000
                     60	    0.00000	    0.00000	    0.00000	    0.00000	    0.00000
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              </tableData>
              <tableData breakPoint="20">
                              -10	        -5	         0	         5	        10
                    -10	    0.00057	  -0.00117	  -0.00248	  -0.00230	  -0.00150
                      0	    0.00267	    0.00424	    0.00477	    0.00407	    0.00095
                      7	    0.00444	    0.00281	    0.00283	  -0.00292	  -0.00155
                     12	    0.00295	    0.00227	    0.00421	  -0.00074	  -0.00294
                     15	    0.00672	    0.00760	    0.01044	    0.00816	    0.00769
                     45	    0.01301	    0.01280	    0.01273	    0.01265	    0.01582
                     60	    0.00758	    0.00768	    0.00740	    0.00734	    0.00743
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              </tableData>
              <tableData breakPoint="50">
                              -10	        -5	         0	         5	        10
                    -10	  -0.00557	  -0.00777	  -0.00942	  -0.00958	  -0.00828
                      0	    0.00297	    0.00662	    0.00658	    0.00404	    0.00495
                      7	    0.00502	    0.00244	    0.00279	  -0.00209	  -0.00395
                     12	    0.00269	    0.00152	    0.00425	  -0.00445	  -0.00649
                     15	    0.00628	    0.00667	    0.01087	    0.00669	    0.00546
                     45	    0.02501	    0.02440	    0.02420	    0.02403	    0.02766
                     60	    0.01520	    0.01544	    0.01480	    0.01474	    0.01501
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              </tableData>
          </table>
       </product>
    </function>
    <function name="aero/c/CFYDSPR">
    <description>SIDEFORCE INCREMENT DUE TO SPOILERS RIGHT</description>
    <product>
          <table>
            <independentVar lookup="row">aero/alpha-deg</independentVar>
            <independentVar lookup="column">aero/beta-deg</independentVar>
            <independentVar lookup="table">fcs/speedbrake-right-deg</independentVar>
              <tableData breakPoint="0">
                              -10	        -5	         0	         5	        10
                    -10	    0.00000	    0.00000	    0.00000	    0.00000	    0.00000
                      0	    0.00000	    0.00000	    0.00000	    0.00000	    0.00000
                      7	    0.00000	    0.00000	    0.00000	    0.00000	    0.00000
                     12	    0.00000	    0.00000	    0.00000	    0.00000	    0.00000
                     15	    0.00000	    0.00000	    0.00000	    0.00000	    0.00000
                     45	    0.00000	    0.00000	    0.00000	    0.00000	    0.00000
                     60	    0.00000	    0.00000	    0.00000	    0.00000	    0.00000
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              </tableData>
              <tableData breakPoint="20">
                              -10	        -5	         0	         5	        10
                    -10	    0.00150	    0.00230	    0.00248	    0.00117	  -0.00057
                      0	  -0.00095	  -0.00407	  -0.00477	  -0.00424	  -0.00267
                      7	    0.00230	    0.00292	  -0.00283	  -0.00281	  -0.00369
                     12	    0.00294	    0.00074	  -0.00421	  -0.00227	  -0.00295
                     15	  -0.00769	  -0.00816	  -0.01032	  -0.00760	  -0.00672
                     45	  -0.01342	  -0.01267	  -0.01273	  -0.01282	  -0.01061
                     60	  -0.00743	  -0.00734	  -0.00740	  -0.00768	  -0.00758
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              </tableData>
              <tableData breakPoint="50">
                              -10	        -5	         0	         5	        10
                    -10	    0.00828	    0.00958	    0.00942	    0.00777	    0.00557
                      0	  -0.00495	  -0.00404	  -0.00658	  -0.00662	  -0.00297
                      7	    0.00470	    0.00209	  -0.00279	  -0.00244	  -0.00427
                     12	    0.00649	    0.00445	  -0.00425	  -0.00152	  -0.00269
                     15	  -0.00546	  -0.00669	  -0.01075	  -0.00667	  -0.00628
                     45	  -0.02526	  -0.02405	  -0.02420	  -0.02442	  -0.02261
                     60	  -0.01501	  -0.01474	  -0.01480	  -0.01544	  -0.01520
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              </tableData>
          </table>
       </product>
    </function>
    <function name="aero/c/CFYP">
    <description>SIDE FORCE DUE TO ROLL RATE</description>
    <product>
          <property>aero/pb</property>
          <table>
            <independentVar lookup="row">aero/alpha-deg</independentVar>
            <tableData>
                    -10		  -0.38990
                     -5		  -0.33587
                      2		  -0.11560
                     10		    0.07297
                     13		    0.10023
                     20		    0.05537
                     55		  -0.01495
                     60		  -0.04795
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            </tableData>
          </table>
       </product>
    </function>
    <function name="aero/c/CFYR">
    <description>SIDE FORCE DUE TO YAW RATE</description>
    <product>
          <property>aero/rb</property>
          <table>
            <independentVar lookup="row">aero/alpha-deg</independentVar>
            <tableData>
                    -10		    0.38447
                     -5		    0.45874
                      2		    0.40901
                     10		    0.43918
                     13		    0.42132
                     20		    0.43994
                     55		    0.39096
                     60		    0.35563
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            </tableData>
          </table>
       </product>
    </function>
    <function name="aero/c/CYDAD">
    <description>SIDE FORCE DUE TO AILERON DEFLECTION</description>
    <product>
          <property>fcs/roll-pos-deg</property>
          <table>
            <independentVar lookup="row">aero/alpha-deg</independentVar>
            <independentVar lookup="column">aero/beta-deg</independentVar>
            <tableData>
                                -10	         -5	          0	          5	         10
                    -10	    0.00039	    0.00038	    0.00035	    0.00032	    0.00029
                      0	    0.00030	    0.00035	    0.00033	    0.00031	    0.00023
                      7	    0.00026	    0.00025	    0.00024	    0.00023	    0.00024
                     12	    0.00023	    0.00023	    0.00029	    0.00026	    0.00024
                     15	    0.00031	    0.00033	    0.00036	    0.00035	    0.00037
                     45	    0.00027	    0.00027	    0.00026	    0.00026	    0.00037
                     60	    0.00017	    0.00016	    0.00016	    0.00015	    0.00015
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            </tableData>
          </table>
       </product>
    </function>
    <function name="aero/c/CYDRD">
    <description>SIDE FORCE DUE TO RUDDER DEFLECTION</description>
    <product>
          <property>fcs/rudder-pos-deg</property>
          <table>
            <independentVar lookup="row">aero/alpha-deg</independentVar>
            <independentVar lookup="column">aero/beta-deg</independentVar>
            <tableData>
                                -10	         -5	          0	          5	         10
                    -10	    0.00302	    0.00343	    0.00375	    0.00384	    0.00387
                      0	    0.00326	    0.00353	    0.00349	    0.00344	    0.00367
                      7	    0.00334	    0.00306	    0.00325	    0.00322	    0.00331
                     12	    0.00326	    0.00317	    0.00249	    0.00326	    0.00315
                     15	    0.00288	    0.00346	    0.00194	    0.00299	    0.00285
                     45	    0.00068	    0.00065	    0.00068	    0.00067	    0.00093
                     60	  -0.00002	    0.00001	    0.00004	    0.00007	    0.00011
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            </tableData>
          </table>
       </product>
    </function>
    <function name="aero/c/CMN1">
    <description>BASE YAWING MOMENT</description>
    <product>
          <table>
            <independentVar lookup="row">aero/alpha-deg</independentVar>
            <independentVar lookup="column">aero/beta-deg</independentVar>
            <independentVar lookup="table">fcs/pitch-pos-deg</independentVar>
              <tableData breakPoint="-17">
                              -10	        -5	         0	         5	        10
                    -10	    0.00562	    0.00143	    0.00000	  -0.00143	  -0.00562
                      0	    0.00500	    0.00082	    0.00000	  -0.00082	  -0.00500
                      7	    0.00138	    0.00082	    0.00000	  -0.00082	  -0.00311
                     12	    0.00183	    0.00241	    0.00000	  -0.00244	  -0.00183
                     15	    0.00716	    0.00215	    0.00000	  -0.00215	  -0.00716
                     45	    0.01320	    0.00514	    0.00000	  -0.00515	  -0.01327
                     60	    0.01045	    0.00423	    0.00000	  -0.00423	  -0.01017
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              </tableData>
              <tableData breakPoint="-10">
                              -10	        -5	         0	         5	        10
                    -10	    0.00563	    0.00148	    0.00000	  -0.00148	  -0.00563
                      0	    0.00470	    0.00082	    0.00000	  -0.00082	  -0.00480
                      7	    0.00140	    0.00076	    0.00000	  -0.00076	  -0.00140
                     12	    0.00171	    0.00228	    0.00000	  -0.00227	  -0.00171
                     15	    0.00651	    0.00172	    0.00000	  -0.00172	  -0.00651
                     45	    0.01328	    0.00514	    0.00000	  -0.00514	  -0.00848
                     60	    0.01012	    0.00421	  -0.00002	  -0.00421	  -0.01013
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              </tableData>
              <tableData breakPoint="-4">
                              -10	        -5	         0	         5	        10
                    -10	    0.00570	    0.00157	    0.00000	  -0.00156	  -0.00570
                      0	    0.00479	    0.00096	    0.00000	  -0.00096	  -0.00479
                      7	    0.00151	    0.00059	    0.00009	  -0.00059	  -0.00151
                     12	    0.00668	    0.00219	    0.00000	  -0.00219	  -0.00162
                     15	    0.00653	    0.00169	    0.00000	  -0.00167	  -0.00653
                     45	    0.01328	    0.00515	  -0.00001	  -0.00515	  -0.01300
                     60	    0.01009	    0.00419	    0.00000	  -0.00418	  -0.01009
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              </tableData>
              <tableData breakPoint="0">
                              -10	        -5	         0	         5	        10
                    -10	    0.00575	    0.00165	    0.00005	  -0.00165	  -0.00575
                      0	    0.00488	    0.00111	    0.00000	  -0.00111	  -0.00488
                      7	    0.00161	    0.00044	    0.00000	  -0.00044	  -0.00161
                     12	    0.00160	    0.00226	    0.00000	  -0.00221	  -0.00161
                     15	    0.00659	    0.00167	    0.00000	  -0.00167	  -0.00659
                     45	    0.01331	    0.00517	  -0.00328	  -0.00517	  -0.01331
                     60	    0.01006	    0.00417	    0.00000	  -0.00415	  -0.01006
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              </tableData>
              <tableData breakPoint="3">
                              -10	        -5	         0	         5	        10
                    -10	    0.00587	    0.00172	  -0.00003	  -0.00172	  -0.00496
                      0	    0.00494	    0.00128	    0.00000	  -0.00128	  -0.00494
                      7	    0.00162	    0.00047	    0.00000	  -0.00047	  -0.00162
                     12	    0.00163	    0.00231	    0.00000	  -0.00231	  -0.00163
                     15	    0.00665	    0.00169	    0.00000	  -0.00169	  -0.00665
                     45	    0.01331	    0.00518	    0.00000	  -0.00518	  -0.01331
                     60	    0.01002	    0.00416	    0.00000	  -0.00416	  -0.01002
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              </tableData>
              <tableData breakPoint="10">
                              -10	        -5	         0	         5	        10
                    -10	    0.00606	    0.00191	    0.00000	  -0.00191	  -0.00606
                      0	    0.00501	    0.00148	    0.00000	  -0.00148	  -0.00501
                      7	    0.00199	    0.00049	    0.00000	  -0.00049	  -0.00199
                     12	    0.00206	    0.00232	    0.00000	  -0.00235	  -0.00206
                     15	    0.00673	    0.00182	    0.00000	  -0.00182	  -0.00673
                     45	    0.01338	    0.00563	    0.00000	  -0.00521	  -0.01310
                     60	    0.00991	    0.00414	    0.00000	  -0.00417	  -0.00997
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              </tableData>
              <tableData breakPoint="17">
                              -10	        -5	         0	         5	        10
                    -10	    0.00661	    0.00219	    0.00000	  -0.00219	  -0.00674
                      0	    0.00605	    0.00193	    0.00000	  -0.00193	  -0.00605
                      7	    0.00248	    0.00084	  -0.00017	  -0.00084	  -0.00249
                     12	    0.00274	    0.00224	    0.00000	  -0.00242	  -0.00275
                     15	    0.00708	    0.00205	    0.00000	  -0.00205	  -0.00708
                     45	    0.01342	    0.00526	    0.00000	  -0.00526	  -0.01348
                     60	    0.00985	    0.00412	    0.00000	  -0.00412	  -0.00985
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              </tableData>
              <tableData breakPoint="23">
                              -10	        -5	         0	         5	        10
                    -10	    0.00787	    0.00321	    0.00000	  -0.00321	  -0.00782
                      0	    0.00630	    0.00240	    0.00000	  -0.00240	  -0.00630
                      7	    0.00263	    0.00123	    0.00000	  -0.00123	  -0.00268
                     12	    0.00321	    0.00250	    0.00000	  -0.00194	  -0.00321
                     15	    0.00790	    0.00228	    0.00000	  -0.00228	  -0.00790
                     45	    0.01358	    0.00532	    0.00000	  -0.00510	  -0.01358
                     60	    0.00980	    0.00411	    0.00000	  -0.00411	  -0.00980
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              </tableData>
              <tableData breakPoint="30">
                              -10	        -5	         0	         5	        10
                    -10	    0.00914	    0.00400	    0.00000	  -0.00400	  -0.00914
                      0	    0.00660	    0.00289	    0.00000	  -0.00288	  -0.00660
                      7	    0.00313	    0.00172	    0.00000	  -0.00172	  -0.00313
                     12	    0.00350	    0.00257	    0.00000	  -0.00230	  -0.00350
                     15	    0.00820	    0.00255	    0.00000	  -0.00255	  -0.00820
                     45	    0.01372	    0.00540	    0.00000	  -0.00538	  -0.01373
                     60	    0.00977	    0.00409	    0.00000	  -0.00409	  -0.00981
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              </tableData>
          </table>
       </product>
    </function>
    <function name="aero/c/CMNBETADOT">
    <description>YAW MOMENT DERIVATIVE FOR BETADOT</description>
    <product>
          <property>aero/betadot-rad_sec</property>
          <table>
            <independentVar lookup="row">aero/alpha-deg</independentVar>
            <tableData>
                    -10		  -0.01295
                     -5		  -0.00146
                      2		    0.02827
                     10		    0.02679
                     13		  -0.01345
                     20		  -0.04451
                     55		  -0.04421
                     60		  -0.03917
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            </tableData>
          </table>
       </product>
    </function>
    <function name="aero/c/CMNDAD">
    <description>YAWING MOMENT DUE TO AILERON DEFLECTION</description>
    <product>
          <property>fcs/roll-pos-deg</property>
          <table>
            <independentVar lookup="row">aero/alpha-deg</independentVar>
            <independentVar lookup="column">aero/beta-deg</independentVar>
            <tableData>
                                -10	         -5	          0	          5	         10
                    -10	  -0.00027	  -0.00028	  -0.00026	  -0.00025	  -0.00023
                      0	  -0.00002	  -0.00003	  -0.00003	  -0.00002	    0.00002
                      7	    0.00013	    0.00014	    0.00017	    0.00019	    0.00020
                     12	    0.00014	    0.00016	    0.00011	    0.00011	    0.00015
                     15	    0.00006	    0.00003	    0.00001	   0.00000	  -0.00001
                     45	  -0.00006	  -0.00006	  -0.00006	  -0.00006	  -0.00008
                     60	  -0.00002	  -0.00002	  -0.00002	  -0.00002	  -0.00002
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            </tableData>
          </table>
       </product>
    </function>
    <function name="aero/c/CMNDFM">
    <description>YAWING MOMENT INCREMENT DUE TO FLAPS</description>
    <product>
          <property>fcs/flap-pos-deg</property>
          <table>
            <independentVar lookup="row">aero/alpha-deg</independentVar>
            <independentVar lookup="column">aero/beta-deg</independentVar>
            <tableData>
                                -10	         -5	          0	          5	         10
                    -10	    0.00185	    0.00116	    0.00000	  -0.00116	  -0.00185
                      0	    0.00257	    0.00414	    0.00000	  -0.00414	  -0.00257
                      7	    0.00307	    0.00191	    0.00000	  -0.00191	  -0.00278
                     12	    0.00994	    0.00140	    0.00000	  -0.00140	  -0.00994
                     15	    0.00467	  -0.00195	    0.00008	    0.00195	  -0.00467
                     45	    0.00751	    0.00344	    0.00000	  -0.00344	  -0.00696
                     60	    0.01012	    0.00553	  -0.00001	  -0.00553	  -0.01012
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            </tableData>
          </table>
       </product>
    </function>
    <function name="aero/c/CMNDRD">
    <description>YAWING MOMENT DUE TO RUDDER DEFLECTION</description>
    <product>
          <property>fcs/rudder-pos-deg</property>
          <table>
            <independentVar lookup="row">aero/alpha-deg</independentVar>
            <independentVar lookup="column">aero/beta-deg</independentVar>
            <tableData>
                                -10	         -5	          0	          5	         10
                    -10	  -0.00144	  -0.00160	  -0.00172	  -0.00175	  -0.00177
                      0	  -0.00161	  -0.00171	  -0.00160	  -0.00161	  -0.00172
                      7	  -0.00161	  -0.00146	  -0.00146	  -0.00149	  -0.00155
                     12	  -0.00149	  -0.00137	  -0.00138	  -0.00139	  -0.00139
                     15	  -0.00135	  -0.00152	  -0.00130	  -0.00129	  -0.00130
                     45	  -0.00032	  -0.00030	  -0.00032	  -0.00032	  -0.00041
                     60	    0.00001	  -0.00001	  -0.00002	  -0.00003	  -0.00005
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            </tableData>
          </table>
       </product>
    </function>
    <function name="aero/c/CMNDSM">
    <description>YAWING MOMENT INCREMENT DUE TO SLATS</description>
    <product>
          <property>fcs/slat-pos-deg</property>
          <table>
            <independentVar lookup="row">aero/alpha-deg</independentVar>
            <independentVar lookup="column">aero/beta-deg</independentVar>
            <tableData>
                                -10	         -5	          0	          5	         10
                    -10	    0.00060	    0.00048	    0.00000	  -0.00048	  -0.00060
                      0	    0.00082	    0.00126	    0.00000	  -0.00126	  -0.00082
                      7	  -0.00022	    0.00081	    0.00000	  -0.00081	    0.00051
                     12	    0.00591	    0.00274	    0.00000	  -0.00274	  -0.00591
                     15	    0.00404	    0.00155	    0.00008	  -0.00155	  -0.00404
                     45	    0.00465	    0.00239	    0.00000	  -0.00239	  -0.00410
                     60	    0.00428	    0.00227	    0.00000	  -0.00227	  -0.00428
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            </tableData>
          </table>
       </product>
    </function>
    <function name="aero/c/CMNDSPL">
    <description>YAWING MOMENT INCREMENT DUE TO SPOILERS LEFT</description>
    <product>
          <table>
            <independentVar lookup="row">aero/alpha-deg</independentVar>
            <independentVar lookup="column">aero/beta-deg</independentVar>
            <independentVar lookup="table">fcs/speedbrake-left-deg</independentVar>
              <tableData breakPoint="0">
                              -10	        -5	         0	         5	        10
                    -10	    0.00000	    0.00000	    0.00000	    0.00000	    0.00000
                      0	    0.00000	    0.00000	    0.00000	    0.00000	    0.00000
                      7	    0.00000	    0.00000	    0.00000	    0.00000	    0.00000
                     12	    0.00000	    0.00000	    0.00000	    0.00000	    0.00000
                     15	    0.00000	    0.00000	    0.00000	    0.00000	    0.00000
                     45	    0.00000	    0.00000	    0.00000	    0.00000	    0.00000
                     60	    0.00000	    0.00000	    0.00000	    0.00000	    0.00000
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              </tableData>
              <tableData breakPoint="20">
                              -10	        -5	         0	         5	        10
                    -10	    0.00171	    0.00100	    0.00017	  -0.00020	  -0.00058
                      0	  -0.00223	  -0.00172	  -0.00187	  -0.00289	  -0.00395
                      7	  -0.00460	  -0.00625	  -0.00711	  -0.00998	  -0.00914
                     12	  -0.00833	  -0.00992	  -0.00931	  -0.00937	  -0.00962
                     15	  -0.00575	  -0.00421	  -0.00320	  -0.00324	  -0.00273
                     45	    0.00219	    0.00234	    0.00245	    0.00256	    0.00346
                     60	    0.00079	    0.00094	    0.00093	    0.00099	    0.00114
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              </tableData>
              <tableData breakPoint="50">
                              -10	        -5	         0	         5	        10
                    -10	  -0.00010	  -0.00104	  -0.00209	  -0.00276	  -0.00325
                      0	  -0.00517	  -0.00447	  -0.00520	  -0.00751	  -0.00725
                      7	  -0.00956	  -0.01255	  -0.01389	  -0.01550	  -0.01735
                     12	  -0.01580	  -0.01892	  -0.01919	  -0.02056	  -0.02113
                     15	  -0.01452	  -0.01330	  -0.01317	  -0.01432	  -0.01422
                     45	    0.00398	    0.00417	    0.00436	    0.00459	    0.00565
                     60	    0.00151	    0.00178	    0.00175	    0.00190	    0.00216
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              </tableData>
          </table>
       </product>
    </function>
    <function name="aero/c/CMNDSPR">
    <description>YAWING MOMENT INCREMENT DUE TO SPOILERS RIGHT</description>
    <product>
          <table>
            <independentVar lookup="row">aero/alpha-deg</independentVar>
            <independentVar lookup="column">aero/beta-deg</independentVar>
            <independentVar lookup="table">fcs/speedbrake-right-deg</independentVar>
              <tableData breakPoint="0">
                              -10	        -5	         0	         5	        10
                    -10	    0.00000	    0.00000	    0.00000	    0.00000	    0.00000
                      0	    0.00000	    0.00000	    0.00000	    0.00000	    0.00000
                      7	    0.00000	    0.00000	    0.00000	    0.00000	    0.00000
                     12	    0.00000	    0.00000	    0.00000	    0.00000	    0.00000
                     15	    0.00000	    0.00000	    0.00000	    0.00000	    0.00000
                     45	    0.00000	    0.00000	    0.00000	    0.00000	    0.00000
                     60	    0.00000	    0.00000	    0.00000	    0.00000	    0.00000
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              </tableData>
              <tableData breakPoint="20">
                              -10	        -5	         0	         5	        10
                    -10	    0.00058	    0.00020	  -0.00017	  -0.00100	  -0.00171
                      0	    0.00395	    0.00289	    0.00187	    0.00172	    0.00223
                      7	    0.00943	    0.00998	    0.00711	    0.00625	    0.00489
                     12	    0.00962	    0.00937	    0.00931	    0.00992	    0.00833
                     15	    0.00273	    0.00324	    0.00336	    0.00421	    0.00575
                     45	  -0.00291	  -0.00256	  -0.00245	  -0.00234	  -0.00164
                     60	  -0.00114	  -0.00099	  -0.00093	  -0.00094	  -0.00079
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              </tableData>
              <tableData breakPoint="50">
                              -10	        -5	         0	         5	        10
                    -10	    0.00325	    0.00276	    0.00209	    0.00104	    0.00010
                      0	    0.00725	    0.00751	    0.00520	    0.00447	    0.00517
                      7	    0.01764	    0.01550	    0.01389	    0.01255	    0.00985
                     12	    0.02113	    0.02056	    0.01919	    0.01892	    0.01580
                     15	    0.01422	    0.01432	    0.01333	    0.01330	    0.01452
                     45	  -0.00510	  -0.00459	  -0.00436	  -0.00417	  -0.00343
                     60	  -0.00216	  -0.00190	  -0.00175	  -0.00178	  -0.00151
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              </tableData>
          </table>
       </product>
    </function>
    <function name="aero/c/CMNP">
    <description>YAW DAMPING DERIVATIVE</description>
    <product>
          <property>aero/pb</property>
          <table>
            <independentVar lookup="row">aero/alpha-deg</independentVar>
            <tableData>
                    -10		    0.23954
                     -5		    0.17891
                      2		    0.00053
                     10		  -0.16751
                     13		  -0.16938
                     20		  -0.11555
                     55		  -0.02474
                     60		  -0.01282
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            </tableData>
          </table>
       </product>
    </function>
    <function name="aero/c/CMNR">
    <description>YAW MOMENT DUE TO ROLL RATE</description>
    <product>
          <property>aero/pb</property>
          <table>
            <independentVar lookup="row">aero/alpha-deg</independentVar>
            <tableData>
                    -10		  -0.15192
                     -5		  -0.15578
                      2		  -0.13295
                     10		  -0.13743
                     13		  -0.17550
                     20		  -0.19546
                     55		  -0.13859
                     60		  -0.11709
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            </tableData>
          </table>
       </product>
    </function>
    <function name="aero/coefficients/CDRAG">
      <sum>
          <property>aero/c/CFXB</property>
          <property>aero/c/CFXDAD</property>
          <property>aero/c/CFXDRD</property>
          <property>aero/c/CFXDSM</property>
          <property>aero/c/CFXDFM</property>
          <property>aero/c/CFXDSPL</property>
          <property>aero/c/CFXDSPR</property>
       </sum>
    </function>
  <axis name="DRAG">
    <function name="aero/force/DRAG">
    <product>
          <property>aero/qbar-psf</property>
          <property>metrics/Sw-sqft</property>
          <property>aero/coefficients/CDRAG</property>
       </product>
    </function>
  </axis>
    <function name="aero/coefficients/CROLL">
      <sum>
          <property>aero/c/CML1</property>
          <property>aero/c/CMLDAD</property>
          <property>aero/c/CMLDRD</property>
          <property>aero/c/CMLDSM</property>
          <property>aero/c/CMLDFM</property>
          <property>aero/c/CMLDSPL</property>
          <property>aero/c/CMLDSPR</property>
          <property>aero/c/CMLBETADOT</property>
          <property>aero/c/CMLP</property>
          <property>aero/c/CMLR</property>
       </sum>
    </function>
  <axis name="ROLL">
    <function name="aero/force/ROLL">
    <product>
          <property>aero/qbar-psf</property>
          <property>metrics/Sw-sqft</property>
          <property>metrics/bw-ft</property>
          <property>aero/coefficients/CROLL</property>
       </product>
    </function>
  </axis>
    <function name="aero/coefficients/CSIDE">
      <sum>
          <property>aero/c/CYDAD</property>
          <property>aero/c/CYDRD</property>
          <property>aero/c/CFYDSM</property>
          <property>aero/c/CFYDFM</property>
          <property>aero/c/CFYDSPL</property>
          <property>aero/c/CFYDSPR</property>
          <property>aero/c/CFYB</property>
          <property>aero/c/CFYP</property>
          <property>aero/c/CFYR</property>
       </sum>
    </function>
  <axis name="SIDE">
    <function name="aero/force/SIDE">
    <product>
          <property>aero/qbar-psf</property>
          <property>metrics/Sw-sqft</property>
          <property>aero/coefficients/CSIDE</property>
       </product>
    </function>
  </axis>
    <function name="aero/coefficients/CLIFT">
      <sum>
          <property>aero/c/CFZDAD</property>
          <property>aero/c/CFZDRD</property>
          <property>aero/c/CFZDSM</property>
          <property>aero/c/CFZDFM</property>
          <property>aero/c/CFZDSPL</property>
          <property>aero/c/CFZDSPR</property>
          <property>aero/c/CFZB</property>
       </sum>
    </function>
  <axis name="LIFT">
    <function name="aero/force/LIFT">
    <product>
          <property>aero/qbar-psf</property>
          <property>metrics/Sw-sqft</property>
          <property>aero/coefficients/CLIFT</property>
       </product>
    </function>
  </axis>
    <function name="aero/coefficients/CPITCH">
      <sum>
          <property>aero/c/CMMDAD</property>
          <property>aero/c/CMMDRD</property>
          <property>aero/c/CMMDSM</property>
          <property>aero/c/CMMDFM</property>
          <property>aero/c/CMMDSPL</property>
          <property>aero/c/CMMDSPR</property>
          <property>aero/c/CMM1</property>
          <property>aero/c/CMMALPHADOT</property>
          <property>aero/c/CMMBETADOT</property>
          <property>aero/c/CMMQ</property>
       </sum>
    </function>
  <axis name="PITCH">
    <function name="aero/force/PITCH">
    <product>
          <property>aero/qbar-psf</property>
          <property>metrics/Sw-sqft</property>
          <property>metrics/cbarw-ft</property>
          <property>aero/coefficients/CPITCH</property>
       </product>
    </function>
  </axis>
    <function name="aero/coefficients/CYAW">
      <sum>
          <property>aero/c/CMNDAD</property>
          <property>aero/c/CMNDRD</property>
          <property>aero/c/CMNDSM</property>
          <property>aero/c/CMNDFM</property>
          <property>aero/c/CMNDSPL</property>
          <property>aero/c/CMNDSPR</property>
          <property>aero/c/CMN1</property>
          <property>aero/c/CMNBETADOT</property>
          <property>aero/c/CMNP</property>
          <property>aero/c/CMNR</property>
       </sum>
    </function>
  <axis name="YAW">
    <function name="aero/force/YAW">
    <product>
          <property>aero/qbar-psf</property>
          <property>metrics/Sw-sqft</property>
          <property>metrics/bw-ft</property>
          <property>aero/coefficients/CYAW</property>
       </product>
    </function>
  </axis>
</aerodynamics>
